Simulations: Version=7
  Replacements
    Plant Lucerne: CropType=Lucerne
      Memo Memo1
        ## References

        ### **Ayaz S, McKenzie BA, McNeil DL, Hill GD.2004**. Light interception and utilization of four grain legumes sown at different plant populations and depths. _Journal of Agricultural Science,_**142**: 297-308.
         **Ayaz S, McKenzie BA, Hill GD, McNeil DL.2004**. Variability in yield of four grain legume species in a subhumid temperate environment. II. Yield components. _Journal of Agricultural Science,_**142**: 21-28.
         **Ayaz S, McKenzie BA, Hill GD, McNeil DL.2004**. Nitrogen distribution in four grain legumes. _Journal of Agricultural Science,_**142**: 309-317.
         **Wilson DR, Robertson MJ.1996.**Pea phenology responses to temperature and photoperiod. _Australian Agronomy Society_.
      OrganArbitrator Arbitrator
        RelativeAllocation NArbitrator
        RelativeAllocation DMArbitrator
      Phenology: DaysAfterSowing=0
        AirTemperatureFunction ThermalTime
          XYPairs: X=[1, 5, 10, 15, 30, 40]; Y=[0, 3, 6.5, 10, 25, 0]
        PhotoperiodFunction Photoperiod: Twilight=-6; DayLength=0
        GerminatingPhase Germinating: Start=Sowing; End=Germination
        EmergingPhase Emerging: Start=Germination; End=Emergence; ShootLag=15; ShootRate=2
          VariableReference ThermalTime: VariableName=[Phenology].ThermalTime.Value()
          VariableReference ThermalTime1: VariableName=[Phenology].ThermalTime.Value()
        GenericPhase Juvenile: Start=Emergence; End=EndJuvenile
          Constant Target: FixedValue=300
          VariableReference ThermalTime: VariableName=[Phenology].ThermalTime.Value()
        GenericPhase Inductive: Start=EndJuvenile; End=FloralInitiation
          VariableReference ThermalTime: VariableName=[Phenology].ThermalTime.Value()
          OnEventFunction Target: SetEvent=EndJuvenile
            Constant PreEventValue: FixedValue=0
            LinearInterpolationFunction PostEventValue: XProperty=[Phenology].Photoperiod.Value()
              XYPairs: X=[10, 13, 14.5, 16.5, 24]; Y=[700, 379, 295, 243, 243]
        GenericPhase Induced: Start=FloralInitiation; End=StartFlowering
          Constant Target: FixedValue=260
          VariableReference ThermalTime: VariableName=[Phenology].ThermalTime.Value()
        GenericPhase Flowering: Start=StartFlowering; End=StartPodfill
          Constant Target: FixedValue=100
          VariableReference ThermalTime: VariableName=[Phenology].ThermalTime.Value()
        GenericPhase Podfilling: Start=StartPodfill; End=Maturity
          Constant Target: FixedValue=1000
          VariableReference ThermalTime: VariableName=[Phenology].ThermalTime.Value()
        GenericPhase Ripening: Start=Maturity; End=HarvestRipe
          Constant Target: FixedValue=100
          VariableReference ThermalTime: VariableName=[Phenology].ThermalTime.Value()
        EndPhase ReadyForHarvesting: Start=HarvestRipe; End=Unused
          VariableReference ThermalTime: VariableName=[Phenology].ThermalTime.Value()
      Structure: Initialised=false; Germinated=false; Emerged=false; CohortToInitialise=0; TipToAppear=0; ApexNum=0
        VariableReference ThermalTime: VariableName=[Phenology].ThermalTime.Value()
        Constant DroughtInducedBranchMortality: FixedValue=0
        Constant MainStemFinalNodeNumber: FixedValue=40
        LinearInterpolationFunction HeightModel: XProperty=[Stem].Live.Wt
          XYPairs: X=[0, 300]; Y=[10, 750]
        MultiplyFunction BranchingRate
          LinearInterpolationFunction Potential_Branching_Rate: XProperty=[Structure].LeafTipsAppeared
            XYPairs: X=[0, 4, 5, 7, 8]; Y=[0, 0, 1, 1, 0]
          LinearInterpolationFunction Cover_response: XProperty=[leaf].CoverGreen
            XYPairs: X=[0, 0.17, 0.25]; Y=[1, 1, 0]
          LinearInterpolationFunction CHO_response: XProperty=[Stem].Live.NonStructuralWt
            XYPairs: X=[0, 1, 10]; Y=[1, 1, 1]
        Constant BranchMortality: FixedValue=0
        PhaseLookup MainStemNodeAppearanceRate
          PhaseLookupValue Vegetative: Start=Emergence; End=StartFlowering
            Constant Function: FixedValue=30
          PhaseLookupValue Flowering: Start=StartFlowering; End=StartPodfill
            Constant Function: FixedValue=40
      ReproductiveOrgan Grain: GrowthRespiration=0; MaintenanceRespiration=0
        Constant MaximumPotentialGrainSize: FixedValue=0.4
        PhaseLookup DMDemandFunction
          PhaseLookupValue GrainFilling: Start=StartFlowering; End=Maturity
            FillingRateFunction
              VariableReference NumberFunction: VariableName=[Grain].NumberFunction.Value()
              AddFunction FillingDuration
                VariableReference FillingDuration: VariableName=[Phenology].GrainFilling.Target.Value()
                VariableReference FillingDuration: VariableName=[Phenology].GrainFilling.Target.Value()
              VariableReference ThermalTime: VariableName=[Phenology].ThermalTime.Value()
              VariableReference PotentialSizeIncrement: VariableName=[Grain].MaximumPotentialGrainSize.Value()
        Biomass Live
        Biomass Dead
        Constant MinimumNConc: FixedValue=0.02
        Constant MaximumNConc: FixedValue=0.03
        Constant WaterContent: FixedValue=0.12
        PhaseLookup NFillingRate
          PhaseLookupValue GrainFilling: Start=StartFlowering; End=Maturity
            FillingRateFunction
              VariableReference NumberFunction: VariableName=[Grain].NumberFunction.Value()
              AddFunction FillingDuration
                VariableReference FillingDuration: VariableName=[Phenology].Flowering.Target.Value()
                VariableReference FillingDuration: VariableName=[Phenology].GrainFilling.Target.Value()
              VariableReference ThermalTime: VariableName=[Phenology].ThermalTime.Value()
              MultiplyFunction PotentialSizeIncrement
                Constant MaximumFinalNConc: FixedValue=0.04
                VariableReference MaximumSize: VariableName=[Grain].MaximumPotentialGrainSize.Value()
        MultiplyFunction NumberFunction
          Constant PeasPerPod: FixedValue=3
          VariableReference PodNumber: VariableName=[Shell].PodNumber.Value()
        BiomassRemoval BiomassRemovalDefaults
          OrganBiomassRemovalType Harvest: FractionLiveToRemove=1; FractionDeadToRemove=0; FractionLiveToResidue=0; FractionDeadToResidue=0
          OrganBiomassRemovalType Cut: FractionLiveToRemove=1; FractionDeadToRemove=0; FractionLiveToResidue=0; FractionDeadToResidue=0
          OrganBiomassRemovalType Prune: FractionLiveToRemove=0; FractionDeadToRemove=0; FractionLiveToResidue=0.8; FractionDeadToResidue=0
          OrganBiomassRemovalType Graze: FractionLiveToRemove=0.6; FractionDeadToRemove=0; FractionLiveToResidue=0.2; FractionDeadToResidue=0
      Root: GrowthRespiration=0; MaintenanceRespiration=0
        CompositeBiomass Live: Propertys=[[Root].LayerLive]
        CompositeBiomass Dead: Propertys=[[Root].LayerDead]
        LinearInterpolationFunction KLModifier: XProperty=[Leaf].LAI
          XYPairs: X=[0, 3]; Y=[1, 1]
        AirTemperatureFunction TemperatureEffect
          XYPairs: X=[0, 26, 35]; Y=[1, 1, 1]
        Constant MaxDailyNUptake: FixedValue=6
        Constant SenescenceRate: FixedValue=0
        Constant MaximumRootDepth: FixedValue=1000000
        PhaseLookup RootFrontVelocity
          PhaseLookupValue PreEmergence: Start=Germination; End=Emergence
            Constant Function: FixedValue=3
          PhaseLookupValue early: Start=Emergence; End=StartFlowering
            Constant Function: FixedValue=15
          PhaseLookupValue late: Start=StartFlowering; End=Maturity
            Constant Function: FixedValue=17
        PhaseLookup PartitionFraction
          PhaseLookupValue Early: Start=Emergence; End=StartFlowering
            Constant Function: FixedValue=0.1
          PhaseLookupValue Middle: Start=StartFlowering; End=StartPodfill
            Constant Function: FixedValue=0.08
          PhaseLookupValue Late: Start=StartPodfill; End=Maturity
            Constant Function: FixedValue=0
        Constant MaximumNConc: FixedValue=0.01
        Constant MinimumNConc: FixedValue=0.005
        PhaseBasedSwitch NitrogenDemandSwitch: Start=Emergence; End=Maturity
        LinearInterpolationFunction KNO3: XProperty=[Root].LengthDensity
          XYPairs: X=[0, 0.003]; Y=[0.02, 0.02]
        LinearInterpolationFunction KNH4: XProperty=[Root].LengthDensity
          XYPairs: X=[0, 0.003]; Y=[0, 0]
        BiomassRemoval BiomassRemovalDefaults
          OrganBiomassRemovalType Harvest: FractionLiveToRemove=0; FractionDeadToRemove=0; FractionLiveToResidue=0.2; FractionDeadToResidue=0
          OrganBiomassRemovalType Cut: FractionLiveToRemove=0; FractionDeadToRemove=0; FractionLiveToResidue=0.3; FractionDeadToResidue=0
          OrganBiomassRemovalType Prune: FractionLiveToRemove=0; FractionDeadToRemove=0; FractionLiveToResidue=0.1; FractionDeadToResidue=0
          OrganBiomassRemovalType Graze: FractionLiveToRemove=0; FractionDeadToRemove=0; FractionLiveToResidue=0.15; FractionDeadToResidue=0
        LinearInterpolationFunction NUptakeSWFactor: XProperty=[Root].RWC
          XYPairs: X=[0, 1]; Y=[0, 1]
        Constant InitialDM: FixedValue=0.2; Units=g/plant
        Constant SpecificRootLength: FixedValue=40; Units=m/g
      Nodule
        Biomass Live
        Biomass Dead
        Constant FixationMetabolicCost: FixedValue=7
        PartitionFractionDemandFunction DMDemandFunction
          PhaseLookup PartitionFraction
            PhaseLookupValue Early: Start=Emergence; End=StartFlowering
              Constant Function: FixedValue=0.03
            PhaseLookupValue Middle: Start=StartFlowering; End=StartPodfill
              Constant Function: FixedValue=0.02
            PhaseLookupValue Late: Start=StartPodfill; End=Maturity
              Constant Function: FixedValue=0
        Constant MaximumNConc: FixedValue=0.02
        Constant MinimumNConc: FixedValue=0.01
        Constant SenescenceRate: FixedValue=0
        Constant NReallocationFactor: FixedValue=0
        PhaseBasedSwitch NitrogenDemandSwitch: Start=Emergence; End=Maturity
        BiomassRemoval BiomassRemovalDefaults
          OrganBiomassRemovalType Harvest: FractionLiveToRemove=0.5; FractionDeadToRemove=0; FractionLiveToResidue=0.1; FractionDeadToResidue=0
          OrganBiomassRemovalType Cut: FractionLiveToRemove=0.8; FractionDeadToRemove=0; FractionLiveToResidue=0; FractionDeadToResidue=0
          OrganBiomassRemovalType Prune: FractionLiveToRemove=0; FractionDeadToRemove=0; FractionLiveToResidue=0.6; FractionDeadToResidue=0
          OrganBiomassRemovalType Graze: FractionLiveToRemove=0.6; FractionDeadToRemove=0; FractionLiveToResidue=0.2; FractionDeadToResidue=0
        Constant StructuralFraction: FixedValue=1; Units=g/g
        Constant InitialWtFunction: FixedValue=0; Units=g/m^2
        Constant DetachmentRateFunction: FixedValue=0; Units=/d
        MultiplyFunction FixationRate
          VariableReference NoduleWt: VariableName=[Nodule].Live.Wt
          Constant SpecificNitrogenaseActivity: FixedValue=4.5
          MinimumFunction
            AirTemperatureFunction FT
              XYPairs: X=[0, 20, 30, 40]; Y=[0, 1, 1, 0]
            LinearInterpolationFunction FW: XProperty=[Leaf].Fw
              XYPairs: X=[0, 1, 1.5]; Y=[0, 1, 1]
            LinearInterpolationFunction FWlog: XProperty=[Leaf].Fw
              XYPairs: X=[0, 1, 1.5]; Y=[1, 1, 1]
        Constant MaintenanceRespirationFunction: FixedValue=0; Units=0-1
        Constant DMConversionEfficiency: FixedValue=1; Units=0-1
      GenericOrgan Shell
        Biomass Live
        Biomass Dead
        Constant NReallocationFactor: FixedValue=0
        Constant NRetranslocationFactor: FixedValue=0.1
        Constant StructuralFraction: FixedValue=0.7
        Constant MaximumNConc: FixedValue=0.03
        Constant MinimumNConc: FixedValue=0.01
        Constant DMRetranslocationFactor: FixedValue=0.1
        PhaseBasedSwitch NitrogenDemandSwitch: Start=Germination; End=Maturity
        PopulationBasedDemandFunction DMDemandFunction
          VariableReference ThermalTime: VariableName=[Phenology].ThermalTime.Value()
          VariableReference OrganPopulation: VariableName=[Shell].PodNumber.Value()
          Constant ExpansionStress: FixedValue=1
          AddFunction GrowthDuration
            VariableReference FloweringGrowthPeriod: VariableName=[Phenology].Flowering.Target.Value()
            Constant PostFloweringGrowthPeriod: FixedValue=60
          Constant StartStage: FixedValue=4
          Constant MaximumOrganWt: FixedValue=0.5
        MultiplyFunction PodNumber
          Constant PodsPerNode: FixedValue=1
          VariableReference StemPopulation: VariableName=[Structure].TotalStemPopn
          PhaseLookupValue FloweringNodes: Start=StartFlowering; End=HarvestRipe
            SubtractFunction FloweringNodes
              VariableReference TotalNodes: VariableName=[Structure].LeafTipsAppeared
              VariableReference VegetativeNodes: VariableName=[Phenology].NFF.Value()
        BiomassRemoval BiomassRemovalDefaults: same as Replacements.Lucerne.Nodule.BiomassRemovalDefaults
        Constant InitialWtFunction: FixedValue=0; Units=g/m^2
        Constant SenescenceRate: FixedValue=0; Units=/d
        Constant DetachmentRateFunction: FixedValue=0; Units=/d
        Constant MaintenanceRespirationFunction: FixedValue=0; Units=0-1
        Constant DMConversionEfficiency: FixedValue=1; Units=0-1
      Leaf: MaxCover=1; R50=200; MicroClimatePresent=true; KDead=0.3; MaximumMainStemLeafNumber=40
        zero: GrowthRespiration, MaintenanceRespiration, CurrentExpandingLeaf, StartFractionExpanded, FractionNextleafExpanded, DeadNodesYesterday, Albedo, Gsmax, FRGR, PotentialEP, DMConversionEfficiency, TipsAtEmergence, CohortsAtInitialisation, FractionDied
        CompositeBiomass Live: Propertys=[[Leaf].CohortLive]
        CompositeBiomass Dead: Propertys=[[Leaf].CohortDead]
        ArrayBiomass CohortArrayLive: Propertys=[[Leaf].Live]; ArraySize=[Leaf].MaxNodeNo
        ArrayBiomass CohortArrayDead: Propertys=[[Leaf].Dead]; ArraySize=[Leaf].MaxNodeNo
        LeafCohort InitialLeaf1: DeltaWaterConstrainedArea=0; DeltaCarbonConstrainedArea=0; Rank=1; Area=100; MaintenanceRespiration=0
        LeafCohort InitialLeaf2: DeltaWaterConstrainedArea=0; DeltaCarbonConstrainedArea=0; Rank=2; Area=0; MaintenanceRespiration=0
        VariableReference ThermalTime: VariableName=[Phenology].ThermalTime.Value()
        LeafCohortParameters
          Constant SenessingLeafRelativeSize: FixedValue=1; Units=0-1
          LinearInterpolationFunction GrowthDuration: XProperty=[Phenology].Stage
            XYPairs: X=[1, 4.5, 6]; Y=[90, 90, 40]
          LinearInterpolationFunction MaxArea: XProperty=[Phenology].Stage
            XYPairs: X=[1, 2, 3, 4, 5, 6, 7, 8]; Y=[0, 1000, 2000, 3000, 4000, 2000, 0, 0]
          LinearInterpolationFunction LagDuration: XProperty=[Phenology].Stage
            XYPairs: X=[1, 4.5, 4.75, 5, 6]; Y=[400, 400, 200, 100, 50]
          LinearInterpolationFunction SenescenceDuration: XProperty=[Phenology].Stage
            XYPairs: X=[1, 5, 5.5, 6]; Y=[80, 80, 40, 10]
          Constant DetachmentLagDuration: FixedValue=1000000
          Constant DetachmentDuration: FixedValue=1000000
          LinearInterpolationFunction SpecificLeafAreaMax: XProperty=[Leaf].LAI
            XYPairs: X=[0, 4, 6, 8]; Y=[90000, 40000, 40000, 40000]
          Constant StructuralFraction: FixedValue=0.5
          LinearInterpolationFunction SpecificLeafAreaMin: XProperty=[Leaf].LAI
            XYPairs: X=[0, 4, 6, 8]; Y=[45000, 20000, 20000, 20000]
          LinearInterpolationFunction ExpansionStress: XProperty=[Lucerne].WaterSupplyDemandRatio
            XYPairs: X=[0, 1]; Y=[0, 1]
          Constant MinimumNConc: FixedValue=0.03
          Constant CriticalNConc: FixedValue=0.05
          Constant MaximumNConc: FixedValue=0.08
          Constant NReallocationFactor: FixedValue=1
          Constant NRetranslocationFactor: FixedValue=0
          Constant DMRetranslocationFactor: FixedValue=0.5
          LinearInterpolationFunction ShadeInducedSenescenceRate: XProperty=[Leaf].CohortCurrentRankCoverAbove
            XYPairs: X=[0, 0.9, 0.90001]; Y=[0, 0, 0]
          Constant InitialNConc: FixedValue=0
          Constant NonStructuralFraction: FixedValue=0
          Constant DMReallocationFactor: FixedValue=0
          Constant LeafSizeShapeParameter: FixedValue=0.01
          Constant MaintenanceRespirationFunction: FixedValue=0
          Constant DroughtInducedSenAcceleration: FixedValue=1
          Constant CellDivisionStress: FixedValue=1; Units=0-1
          Constant CellDivisionStress1: FixedValue=1; Units=0-1
          Constant CellDivisionStress2: FixedValue=1; Units=0-1
          Constant CellDivisionStress3: FixedValue=1; Units=0-1
          Constant CellDivisionStress4: FixedValue=1; Units=0-1
          Constant DroughtInducedLagAcceleration: FixedValue=1
        LinearInterpolationFunction ExtinctionCoeff: XProperty=[Leaf].LAI
          XYPairs: X=[0, 0.5]; Y=[0.7, 0.7]
        RUEModel Photosynthesis
          Constant RUE: FixedValue=1
          WeightedTemperatureFunction FT: MaximumTemperatureWeighting=0.5
            XYPairs: X=[0, 15, 30, 40]; Y=[0, 1, 1, 0]
          LinearInterpolationFunction FVPD: XProperty=[Leaf].Photosynthesis.VPD
            XYPairs: X=[0, 10, 50]; Y=[1, 1, 1]
          LinearInterpolationFunction FN: XProperty=[Leaf].Fn
            XYPairs: X=[0, 1, 1.5]; Y=[1, 1, 1]
          LinearInterpolationFunction FW: XProperty=[Leaf].Fw
            XYPairs: X=[0, 1, 1.5]; Y=[1, 1, 1]
          RUECO2Function FCO2: PhotosyntheticPathway=C3
          Memo
            Ayaz eta 2004 presented a RUE of 1.6 g/MJ PAR during non-limiting temperature conditions for field pea.  Halving this to make it total radiation gives 0.8 g/MJ and adding 20% to account for root and  nodule production and N fixiation costs gives 1.0 g/MJ
          VariableReference RadnInt: VariableName=[Leaf].RadIntTot
        MinimumFunction FRGRFunction
          VariableReference RUE_FT: VariableName=[Leaf].Photosynthesis.FT.Value()
          MinimumFunction Others
            VariableReference RUE_FN: VariableName=[Leaf].Photosynthesis.FN.Value()
            VariableReference RUE_FVPD: VariableName=[Leaf].Photosynthesis.FVPD.Value()
        LinearInterpolationFunction FrostFraction: XProperty=[Weather].MinT
          XYPairs: X=[-1, 0]; Y=[0, 0]
        BiomassRemoval BiomassRemovalDefaults
          OrganBiomassRemovalType Harvest: FractionLiveToRemove=0; FractionDeadToRemove=0; FractionLiveToResidue=0.3; FractionDeadToResidue=0
          OrganBiomassRemovalType Cut: FractionLiveToRemove=0.8; FractionDeadToRemove=0; FractionLiveToResidue=0; FractionDeadToResidue=0
          OrganBiomassRemovalType Prune: FractionLiveToRemove=0; FractionDeadToRemove=0; FractionLiveToResidue=0.6; FractionDeadToResidue=0
          OrganBiomassRemovalType Graze: FractionLiveToRemove=0.6; FractionDeadToRemove=0; FractionLiveToResidue=0.1; FractionDeadToResidue=0
        Constant StructuralFraction: FixedValue=0.5
        Constant DMConversionEfficiencyFunction: FixedValue=1
      GenericOrgan Stem
        Biomass Live
        Biomass Dead
        Constant NReallocationFactor: FixedValue=0
        Constant NRetranslocationFactor: FixedValue=0.1
        Constant DMRetranslocationFactor: FixedValue=0.1
        InternodeDemandFunction DMDemandFunction
          Constant InterNodeWt: FixedValue=0.1
        Constant MaximumNConc: FixedValue=0.03
        Constant MinimumNConc: FixedValue=0.01
        PhaseBasedSwitch NitrogenDemandSwitch: Start=Emergence; End=Maturity
        Constant StructuralFraction: FixedValue=0.7
        BiomassRemoval BiomassRemovalDefaults: same as Replacements.Lucerne.Nodule.BiomassRemovalDefaults
        Constant InitialWtFunction: FixedValue=0; Units=g/m^2
        Constant SenescenceRate: FixedValue=0; Units=/d
        Constant DetachmentRateFunction: FixedValue=0; Units=/d
        Constant MaintenanceRespirationFunction: FixedValue=0; Units=0-1
        Constant DMConversionEfficiency: FixedValue=1; Units=0-1
      CompositeBiomass AboveGround
        Propertys=[[Leaf].Live, [Leaf].Dead, [Stem].Live, [Stem].Dead, [Grain].Live, [Grain].Dead, [Shell].Live, [Shell].Dead]
      CompositeBiomass BelowGround: Propertys=[[Root].Live, [Root].Dead, [Nodule].Live, [Nodule].Dead]
      CompositeBiomass Total
        Propertys=[[Leaf].Live, [Leaf].Dead, [Stem].Live, [Stem].Dead, [Grain].Live, [Grain].Dead, [Shell].Live, [Shell].Dead, [Root].Live, [Root].Dead, [Nodule].Live, [Nodule].Dead]
      CompositeBiomass TotalLive
        Propertys=[[Leaf].Live, [Stem].Live, [Grain].Live, [Shell].Live, [Root].Live, [Nodule].Live]
      CompositeBiomass TotalDead
        Propertys=[[Leaf].Dead, [Stem].Dead, [Grain].Dead, [Shell].Dead, [Root].Dead, [Nodule].Dead]
      CompositeBiomass Pod: Propertys=[[Shell].Live, [Shell].Dead, [Grain].Live, [Grain].Dead]
      Cultivar Kaituna
      Memo
        ## References

        ### **Ayaz S, McKenzie BA, McNeil DL, Hill GD.** **2004**. Light interception and utilization of four grain legumes sown at different plant populations and depths. _Journal of Agricultural Science,_ **142**: 297-308.
         **Ayaz S, McKenzie BA, Hill GD, McNeil DL.** **2004**. Variability in yield of four grain legume species in a subhumid temperate environment. II. Yield components. _Journal of Agricultural Science,_ **142**: 21-28.
         **Ayaz S, McKenzie BA, Hill GD, McNeil DL.** **2004**. Nitrogen distribution in four grain legumes. _Journal of Agricultural Science,_ **142**: 309-317.
         **Wilson DR, Robertson MJ.** **1996.** Pea phenology responses to temperature and photoperiod. _Australian Agronomy Society_.
    Plant SCRUM: CropType=SCRUM
      Memo TitlePage
        # SCRUM: the Simple Crop Resource Uptake Model

        _Hamish Brown and Rob Zyskowski, Plant and Food Research, New Zealand_

        This model has been built using the Plant Modelling Framework (PMF) of [brown_plant_2014] to simulate a range of different crops in simulations where water and nitrogen balance are of interest but a fully mechanistic plant model is not needed or is not available. It is a daily time step implementation of the crop model that is used on the Overseer nutrient balance model [Cichota_etal_2010].  It uses simple sigmoidal functions for estimating daily cover and biomass deltas to give realistic water and nitrogen demands. It does not simulate potential yield, this is specified as an input. Yield will be reduced below the specified potential yield if N or water supplies from the soil are insufficient to meet demand. The model has been paramaterised for simulating water and nitrogen balances of cropping rotations in New Zealand (where over 50 different crop types are grown and it is not feasible to produce full crop models for each of these).  Because of this the model is not as generically applicable as full APSIM crop models.   It may be adapted for other purposes and other crop types may be added but the user will need to keep in mind that because it is a simple model the the parameters might need changing for crops in different locations or for crops sown at different times of the year.  Some sensibility testing or validation is recommended before application in different sutuations.

        SCRUM has a simple phenology model which divides the crop growth into three main phases; a vegetative phase when the canopy is expanding, a reproductive phase when product is being formed and a senescing phase when the canopy is contracting.  SCRUM has 4 organ classes to represent different biomass components and the real biomass components that these classes represent changes from crop to crop:
           1. A Simple leaf class called <b>Stover</b> which represents the unharvested parts of the plant.  Generally, this represents the leaf and stem components of the crop but for crops where stem and leaf are part of the harvested product (e.g forages and leafy vegetables) than stover is the residual fraction of leaf and stem that is not harvested.
           2. A Generic organ class called <b>Product</b> which represents the plant parts that are harvested and removed from the field.  This could represent grain, fruits, tubers, leaf or stem depending on what sort of crop is being represented.
           3. A Root organ which extracts water and nitrogen from the soil for plant growth and returns biomass to the soil on harvest
           4. A Nodule organ which is only activated and fixes nitrogen for the legume crops.
        An Arbitrator is also included which determines the allocation of drymatter and nitrogen biomass between each of these organs.

        ##Inclusion in APSIM simulations
        A scrum crop is included in a simulation the same as any other APSIM crop
         * The SCRUM object needs to be dragged or copied from the Crop folder in the tool box into the field of your simulation.
         * It is then planted with a sowing rule
        <pre><code class='language-cs'>
        SCRUM.Sow(cultivar: Wheat_Autumn, population: 1, depth: 10, rowSpacing: 150);
        </code></pre>
          * Note that SCRUM has no notion of population or rowSpacing but these parameters are required by the Sow method so filler values are provided
          * To specify an expected Expected Yield that differs to the defalt value provided, included the following code in a manager script to be executed on the day of sowing.
        <pre><code class='language-cs'>
         zone.Set("[SCRUM].Product.ExpectedYield.Value()", ResetValue);
        </code></pre>
        * SCRUM can be Harvested, Cut, Grazed and Pruned like other crops.  Defalt proportions of the biomass in each organ are removed from the sysem and/or added to the fields residue pools.  Note that defalt removal fraction for product on harvest is 0 (becaue it is represented with a generic organ) so more appropriate removal fractions should be sepcified in a manager script as follows:
        <pre><code class='language-cs'>
        [EventSubscribe("Commencing")]
        private void OnSimulationCommencing(object sender, EventArgs e)
        {
          Remove = new RemovalFractions(SCRUM.Organs);
        }
        [EventSubscribe("DoManagement")]
        private void OnDoManagement(object sender, EventArgs e)
        {
          if (Clock.Today.Date == HarvestDate2)
          {
            Remove.SetFractionLiveToRemove("Product", 1.0);
            Remove.SetFractionLiveToRemove("Stover", 0.05);
            Remove.SetFractionLiveToResidue("Stover",0.95)
            SCRUM.Harvest(Remove);
            SCRUM.EndCrop();
          }
        }
         </code></pre>
        * A Remove class as shown above can be sent with Harvest, Cut, Graze and Prune events to specificy the proportions of removals.
         * Once a crop has been ended the field is open to plant another crop using another APSIM crop model or sowing another SCRUM crop.
      Phenology: DaysAfterSowing=0
        AirTemperatureFunction ThermalTime
          Memo Description
            Progression through each of the phenological stages is driven by thermal time.  As temperature increases from zero to 30 degrees, development acelerates and then slows down again above 30 degress
          XYPairs: X=[0, 30, 40]; Y=[0, 30, 0]
        Memo Description1
          As ThermalTime accumulates the crop progresses through the following phases:
        GerminatingPhase Germinating: Start=Sowing; End=Germination
        EmergingPhase Emerging: Start=Germination; End=Emergence; ShootLag=0; ShootRate=0
          VariableReference ThermalTime: VariableName=[Phenology].ThermalTime.Value()
          Memo Description
            Currently the duration of the Emergence phase is set to zero because the period of zero cover and biomass production following sowing is accounted for in the cover and biomass accumulation functions.  However this phase is included if parameterisations of other crops in the future wish to give this phase a duration.
        GenericPhase CanopyExpanding: Start=Emergence; End=StartReproductive
          Memo Description
            During this phase the plant only partitions biomass to Root and Stover (leaf and stem) Organs
          Constant Target: FixedValue=1000; Units=<sup>o</sup>Cd
          VariableReference ThermalTime: VariableName=[Phenology].ThermalTime.Value()
        GenericPhase YieldIncreasing: Start=StartReproductive; End=StartSenescence
          Memo Description
            During this phase the plant is partitioning biomass to Root, Stover and Product organs.
          Constant Target: FixedValue=600; Units=<sup>o</sup>Cd
          VariableReference ThermalTime: VariableName=[Phenology].ThermalTime.Value()
        GenericPhase Senescing: Start=StartSenescence; End=EndReproductive
          Memo Description
            During this phase the plant is partitioning biomass to Root and Product organs and the canopy cover decreases from its maximum to zero
          Constant Target: FixedValue=600; Units=<sup>o</sup>Cd
          VariableReference ThermalTime: VariableName=[Phenology].ThermalTime.Value()
        GenericPhase Mature: Start=EndReproductive; End=Maturity
          Constant Target: FixedValue=600; Units=<sup>o</sup>Cd
          VariableReference ThermalTime: VariableName=[Phenology].ThermalTime.Value()
          Memo Description
            During this phase the plant has completed its growth and is drying ready for harvest.
        EndPhase ReadyForHarvest: Start=Maturity; End=Unused
          VariableReference ThermalTime: VariableName=[Phenology].ThermalTime.Value()
      OrganArbitrator Arbitrator
        RelativeAllocation NArbitrator
        RelativeAllocation DMArbitrator
      GenericOrgan Product
        Memo Description
          It is the biomass that is removed from the crop at harvest and may include grain, root, leaf, stem, pod or any other organ type depending on the type of crop and how it is harvested.
        Biomass Live
        Biomass Dead
        Constant MaximumNConc: FixedValue=0.012
        Constant MinimumNConc: FixedValue=0.008
        Constant NReallocationFactor: FixedValue=0
        PartitionFractionDemandFunction DMDemandFunction
          PhaseLookup PartitionFraction
            PhaseLookupValue YieldIncreasing: Start=StartReproductive; End=StartSenescence
              SubtractFunction ProductProportion
                Constant One: FixedValue=1
                VariableReference RootFraction: VariableName=[Root].RootProportion.Value()
                VariableReference StoverFraction
                  VariableName=[Stover].DMDemandFunction.PartitionFraction.YieldIncreasing.Value()
            PhaseLookupValue Senescing: Start=StartSenescence; End=EndReproductive
              SubtractFunction StoverFraction
                Constant One: FixedValue=1
                VariableReference RootFraction: VariableName=[Root].RootProportion.Value()
        Constant ExpectedYield: FixedValue=800
          Memo Description
            This is the Product yield (g/m2 fresh weight) that SCRUM will predict provided nitrogen and water supply are non-limiting
        Constant DryMatterContent: FixedValue=0.87
          Memo Description
            This is the dry matter content of the harvested yield and is used to convert fresh yield into *DryYield* which are subsequently used in determining *Ymax* (total biomass production), daily dry matter production, *HarvestIndex* and the *PartitioningFraction* of each organ
        MultiplyFunction DryYield
          Memo Description
            This variable is the product yield of the crop in g/m2 dry weight
          VariableReference FreshYld: VariableName=[Product].ExpectedYield.Value()
          VariableReference DMPercent: VariableName=[Product].DryMatterContent.Value()
        SubtractFunction WaterContent
          Memo Description
            This is used to convert the total Dry Matter of this organ back to fresh mass once daily partitining is complete.
          Constant One: FixedValue=1
          VariableReference DMcontent: VariableName=[Product].DryMatterContent.Value()
        Constant HarvestIndex: FixedValue=0.46
          Memo Description
            This is the Product yield (g/m2 fresh weight) that SCRUM will predict provided nitrogen and water supply are non-limiting
        Constant SenescenceRate: FixedValue=0; Units=/d
        BiomassRemoval BiomassRemovalDefaults: same as Replacements.Lucerne.Nodule.BiomassRemovalDefaults
        Constant InitialWtFunction: FixedValue=0; Units=g/m^2
        Constant StructuralFraction: FixedValue=1; Units=0-1
        Constant DetachmentRateFunction: FixedValue=0; Units=/d
        Constant MaintenanceRespirationFunction: FixedValue=0; Units=0-1
        Constant DMConversionEfficiency: FixedValue=1; Units=0-1
      SimpleLeaf Stover: CohortsInitialised=false; Albedo=0.18; Gsmax=0.01; R50=150; MicroClimatePresent=true
        zero: TipsAtEmergence, CohortsAtInitialisation, InitialisedCohortNo, AppearedCohortNo, PlantAppearedLeafNo, LAI, Height, FRGR, PotentialEP, KDead, LAIDead
        Memo Description
          Stover represents any part of the crop that is not removed at harvest (i.e not part of the product).
        Biomass Live
        Biomass Dead
        Constant NReallocationFactor: FixedValue=0
        Constant SenescenceRate: FixedValue=0
        Constant DetachmentRateFunction: FixedValue=0; Units=/d
        Constant StructuralFraction: FixedValue=1; Units=0-1
        MultiplyFunction InitialWtFunction
          Constant InitialPlantWt: FixedValue=0; Units=g/plant
          VariableReference Population: VariableName=[Plant].Population
        Constant LaiDeadFunction: FixedValue=0; Units=m^2/m^2
        MultiplyFunction Photosynthesis
          DeltaFunction UnStressedBiomass: StartStageName=Emergence
            SigmoidFunction2 Integral
              VariableReference Ymax: VariableName=[Stover].Ymax.Value()
              VariableReference XValue: VariableName=[Phenology].AccumulatedEmergedTT
              VariableReference Xo: VariableName=[Stover].XoBiomass.Value()
              VariableReference b: VariableName=[Stover].bBiomass.Value()
          LinearInterpolationFunction WaterStressFactor: XProperty=[Stover].Fw
            XYPairs: X=[0, 0, 0.5, 1]; Y=[0, 0, 1, 1]
        MinimumFunction FRGRFunction
          AirTemperatureFunction FRGRFunctionTemp
            XYPairs: X=[0, 10, 25, 40]; Y=[0, 1, 1, 0]
        PartitionFractionDemandFunction DMDemandFunction
          Memo Description
            DM demand is based on a simple partitioning coefficients.  At harvest the biomass partitioned to the stover = TotalDM * (1 - RootProportion) * (1 - Harvest index).  However the partitioningFraction is more complicated that this as it partitions more biomass to the stover in the CanopyExpanding Phase and less in the Yield increasing phase to give realistic patterns of accumulation of biomass in the Stover and Product over the duration of the crop
          PhaseLookup PartitionFraction
            PhaseLookupValue Expanding: Start=Emergence; End=StartReproductive
              SubtractFunction DMPartitionCoefficient
                Constant One: FixedValue=1
                VariableReference RootFraction: VariableName=[Root].RootProportion.Value()
            PhaseLookupValue YieldIncreasing: Start=StartReproductive; End=StartSenescence
              DivideFunction DMPartitionCoefficient
                SubtractFunction StoverBiomass
                  MultiplyFunction StoverAtMaturity
                    SubtractFunction AboveGroundProportion
                      Constant One: FixedValue=1
                      VariableReference RootFraction: VariableName=[Root].RootProportion.Value()
                    SubtractFunction StoverProportion
                      Constant One: FixedValue=1
                      VariableReference HI: VariableName=[Product].HarvestIndex.Value()
                    VariableReference BiomassAtMaturity: VariableName=[Stover].TotalBiomassAtMaturity.Value()
                  MultiplyFunction StoverAtStartReproductive
                    VariableReference BiomassAtStartReproductive: VariableName=[Stover].TotalBiomassAtStartReproductive.Value()
                    SubtractFunction AboveGroundProportion
                      Constant One: FixedValue=1
                      VariableReference RootFraction: VariableName=[Root].RootProportion.Value()
                SubtractFunction TotalBiomass
                  VariableReference BiomassAtStartSenescence: VariableName=[Stover].TotalBiomassAtStartSenescence.Value()
                  VariableReference BiomassAtStartReproductive: VariableName=[Stover].TotalBiomassAtStartReproductive.Value()
        PhaseLookup CoverFunction
          PhaseLookupValue Expanding: Start=Emergence; End=StartSenescence
            SigmoidFunction2 SigCoverFunction
              Constant Ymax: FixedValue=0.97
              VariableReference XValue: VariableName=[Phenology].AccumulatedEmergedTT
              Constant Xo: FixedValue=540
              Constant b: FixedValue=120
          PhaseLookupValue Senescence: Start=StartSenescence; End=Maturity
            MultiplyFunction DecreasingCover
              HoldFunction MaxCover: WhenToHold=StartSenescence
                VariableReference ValueToHold: VariableName=[Stover].CoverGreen
              SubtractFunction ProportionLost
                Constant One: FixedValue=1
                DivideFunction ProportionRemaining
                  SubtractFunction TTSenesce
                    VariableReference AccumulatedThermalTime: VariableName=[Phenology].AccumulatedEmergedTT
                    AddFunction ThermalTimeAtStartSenescence
                      VariableReference CanopyExpandingTT: VariableName=[Phenology].CanopyExpanding.Target.Value()
                      VariableReference YieldIncreasingTT: VariableName=[Phenology].YieldIncreasing.Target.Value()
                  VariableReference SenescentPhaseDuration: VariableName=[Phenology].Senescing.Target.Value()
        Constant ExtinctionCoefficientFunction: FixedValue=0.5
          Memo Description
            The extinction coefficient is used to calculate a LAI value (needed by MicroClimate) from the canopy cover
        LinearInterpolationFunction HeightFunction: XProperty=[Phenology].Stage
          XYPairs: X=[3, 5, 6]; Y=[100, 800, 1200]
        Constant MaximumNConc: FixedValue=0.008
        Constant MinimumNConc: FixedValue=0
        PhaseLookupValue NitrogenDemandSwitch: Start=Emergence; End=StartSenescence
          Constant One: FixedValue=1
        Constant XoBiomass: FixedValue=800
          Memo Description
            Is a coefficient for the potential biomass accumulation function
        Constant bBiomass: FixedValue=800
          Memo Description
            Is another coefficient for the potential biomass accumulation function
        DivideFunction Ymax
          Memo Description
            This variable is the total biomass (g/m2dry weight) that the crop will produce at maturity in the absence of stress
          VariableReference DryYield: VariableName=[Product].DryYield.Value()
          SubtractFunction AboveGroundDMProportion
            Constant One: FixedValue=1
            VariableReference RootFraction: VariableName=[Root].RootProportion.Value()
          VariableReference HarvestIndex: VariableName=[Product].HarvestIndex.Value()
        SigmoidFunction2 TotalBiomassAtStartReproductive
          VariableReference XValue: VariableName=[Phenology].CanopyExpanding.Target.Value()
          VariableReference Ymax: VariableName=[Stover].Ymax.Value()
          VariableReference Xo: VariableName=[Stover].XoBiomass.Value()
          VariableReference b: VariableName=[Stover].bBiomass.Value()
        SigmoidFunction2 TotalBiomassAtStartSenescence
          AddFunction XValue
            VariableReference CanopyExpandingTT: VariableName=[Phenology].CanopyExpanding.Target.Value()
            VariableReference YieldIncreasingTT: VariableName=[Phenology].YieldIncreasing.Target.Value()
          VariableReference Ymax: VariableName=[Stover].Ymax.Value()
          VariableReference Xo: VariableName=[Stover].XoBiomass.Value()
          VariableReference b: VariableName=[Stover].bBiomass.Value()
        SigmoidFunction2 TotalBiomassAtMaturity
          AddFunction XValue
            VariableReference CanopyExpandingTT: VariableName=[Phenology].CanopyExpanding.Target.Value()
            VariableReference YieldIncreasingTT: VariableName=[Phenology].YieldIncreasing.Target.Value()
            VariableReference SenescingTT: VariableName=[Phenology].Senescing.Target.Value()
          VariableReference Ymax: VariableName=[Stover].Ymax.Value()
          VariableReference Xo: VariableName=[Stover].XoBiomass.Value()
          VariableReference b: VariableName=[Stover].bBiomass.Value()
        BiomassRemoval BiomassRemovalDefaults: same as Replacements.Lucerne.Leaf.BiomassRemovalDefaults
        Constant MaintenanceRespirationFunction: FixedValue=0; Units=0-1
        Constant DMConversionEfficiency: FixedValue=1; Units=0-1
      Root: GrowthRespiration=0; MaintenanceRespiration=0
        Memo Description
          The root organ demands and is partitioned N and DM and its depth increases through time to provide a water uptake supply
        CompositeBiomass Live: Propertys=[[Root].LayerLive]
        CompositeBiomass Dead: Propertys=[[Root].LayerDead]
        LinearInterpolationFunction KLModifier: XProperty=[Root].LayerMidPointDepth
          XYPairs
            X=[0, 50, 100, 150, 200, 250, 300, 350, 400, 450, 500, 550, 600, 650, 700, 750, 800, 850, 900, 950, 1000, 1050, 1100, 1150, 1200, 1250, 1300, 1350, 1400, 1450]
            Y=[1, 1, 1, 1, 1, 1, 1, 1, 1, 1, 1, 1, 1, 1, 1, 1, 1, 1, 1, 1, 1, 1, 1, 1, 1, 1, 1, 1, 1, 1]
          Memo Description
            This is important in SCRUM as it is set for each species to represent their differences in rooting patterns between crop species.  The values for  each crop type are calculated externally from APSIM using the root depth of the crop and an exponential of the form:

            <pre><code class='language-cs'>
            for (int layer = 0; layer lessthan  Soil.Thickness.Length; layer++)
            {
            if (layer.depth lessthan 305)
             layer.KLModifier = 1;
            else if (layer.depth lessthan Crop.RootDepth)
             layer.KLModifier = 1*exp(-.002*(1500/(Crop.RootDepth-300)*(layer.depth-300)));
            else:
             layer.KLModifier = 0;
            }
            </code></pre>

            This gives KLModifiers that decline exponentially from 1 in the top 300mm of soil to 0 at the crops maximum rooting depth.

            It is important to note that these modifiers are applied to the kl value specified in the SCRUMSoil node under the soil in your field so the values on the soil node should be set to 0.1 throughout the depth of the profile to produce sensible kl values.
        Constant SoilWaterEffect: FixedValue=1
        Constant MaxDailyNUptake: FixedValue=12
        Constant SenescenceRate: FixedValue=0
        Constant MaximumNConc: FixedValue=0.009
        Constant MinimumNConc: FixedValue=0.009
        PhaseBasedSwitch NitrogenDemandSwitch: Start=Germination; End=Maturity
        Constant MaximumRootDepth: FixedValue=1500
        MultiplyFunction RootFrontVelocity
          LessThanFunction RootFrontVelocity
            VariableReference TestVariable: VariableName=[Phenology].AccumulatedEmergedTT
            AddFunction GrowthDuration
              VariableReference CanopyExpandingTT: VariableName=[Phenology].CanopyExpanding.Target.Value()
              VariableReference YieldIncreasingTT: VariableName=[Phenology].YieldIncreasing.Target.Value()
            DivideFunction IfTrue
              VariableReference MaxRootDepth: VariableName=[Root].MaximumRootDepth.Value()
              VariableReference GrowthDuration
                VariableName=[Root].RootFrontVelocity.RootFrontVelocity.GrowthDuration.Value()
            Constant IfFalse: FixedValue=0
          VariableReference ThermalTime: VariableName=[Phenology].ThermalTime.Value()
        PhaseLookupValue PartitionFraction: Start=Emergence; End=EndReproductive
          VariableReference RootProportion: VariableName=[Root].RootProportion.Value()
        Constant RootProportion: FixedValue=0.1
          Memo Description
            This is the proportion of total biomass that is paritioned into the roots and is used to set the partitioning fraction for the roots
        BiomassRemoval BiomassRemovalDefaults: same as Replacements.Lucerne.Root.BiomassRemovalDefaults
        Constant InitialDM: FixedValue=0.2; Units=g/plant
        Constant SpecificRootLength: FixedValue=40; Units=m/g
        LinearInterpolationFunction KNO3: XProperty=[Root].LengthDensity
          XYPairs: X=[0, 0.003]; Y=[0.02, 0.02]
        LinearInterpolationFunction KNH4: XProperty=[Root].LengthDensity
          XYPairs: X=[0, 0.003]; Y=[0, 0]
        LinearInterpolationFunction NUptakeSWFactor: XProperty=[Root].RWC
          XYPairs: X=[0, 1]; Y=[0, 1]
      Nodule
        Memo Description
          The nodule organ is unparameterised and simply has a switch that is turned on for legume crops (so they can fix what ever N the crop demands) and switched off for non legume crops (which fix no N)
        Biomass Live
        Biomass Dead
        Constant MaximumNConc: FixedValue=0
        Constant MinimumNConc: FixedValue=0
        Constant NReallocationFactor: FixedValue=0
        Constant SenescenceRate: FixedValue=0
        Constant FixationRate: FixedValue=0
        BiomassRemoval BiomassRemovalDefaults
          OrganBiomassRemovalType Harvest: FractionLiveToRemove=0; FractionDeadToRemove=0; FractionLiveToResidue=0; FractionDeadToResidue=0
          OrganBiomassRemovalType Cut: FractionLiveToRemove=0; FractionDeadToRemove=0; FractionLiveToResidue=0; FractionDeadToResidue=0
          OrganBiomassRemovalType Prune: FractionLiveToRemove=0; FractionDeadToRemove=0; FractionLiveToResidue=0; FractionDeadToResidue=0
          OrganBiomassRemovalType Graze: FractionLiveToRemove=0; FractionDeadToRemove=0; FractionLiveToResidue=0; FractionDeadToResidue=0
        Constant StructuralFraction: FixedValue=1; Units=0-1
        Constant DMDemandFunction: FixedValue=0; Units=g/m^2
        Constant InitialWtFunction: FixedValue=0; Units=g/m^2
        Constant DetachmentRateFunction: FixedValue=0; Units=/d
        Constant FixationMetabolicCost: FixedValue=0
        Constant MaintenanceRespirationFunction: FixedValue=0; Units=0-1
        Constant DMConversionEfficiency: FixedValue=1; Units=0-1
      CompositeBiomass Total
        Propertys=[[Stover].Live, [Stover].Dead, [Product].Live, [Product].Dead, [Root].Live, [Root].Dead]
      CompositeBiomass AboveGround
        Propertys=[[Stover].Live, [Stover].Dead, [Product].Live, [Product].Dead]
        Memo
          The AboveGround composite biomass object includes Stover and Product organs.
      Cultivar Barley_Autumn
        Command:
          [Nodule].FixationMetabolicCost.FixedValue = 0
          [Nodule].FixationRate.FixedValue = 0
          [Phenology].CanopyExpanding.Target.FixedValue = 1461.0
          [Phenology].Senescing.Target.FixedValue = 600
          [Phenology].YieldIncreasing.Target.FixedValue = 939.0
          [Product].DryMatterContent.FixedValue = 0.87
          [Product].ExpectedYield.FixedValue = 1100
          [Product].HarvestIndex.FixedValue = 0.41
          [Product].MaximumNConc.FixedValue = 0.013
          [Product].MinimumNConc.FixedValue = 0.0091
          [Root].KLModifier.XYPairs.Y = 1,1,1,1,1,1,1,0.882,0.779,0.687,0.607,0.535,0.472,0.417,0.368,0.325,0.287,0.253,0.223,0.197,0.174,0.153,0.135,0.119,0.105,0.093,0.082,0.072,0.064,0.056
          [Root].MaximumNConc.FixedValue = 0.009
          [Root].MaximumRootDepth.FixedValue = 1500
          [Root].MinimumNConc.FixedValue = 0.009
          [Root].RootProportion.FixedValue = 0.1
          [Stover].CoverFunction.Expanding.SigCoverFunction.Xo.FixedValue = 540
          [Stover].CoverFunction.Expanding.SigCoverFunction.Ymax.FixedValue = 0.96
          [Stover].CoverFunction.Expanding.SigCoverFunction.b.FixedValue = 120
          [Stover].MaximumNConc.FixedValue = 0.005
          [Stover].MinimumNConc.FixedValue = 0.005
          [Stover].XoBiomass.FixedValue = 1500.0
          [Stover].bBiomass.FixedValue = 300.0
      Cultivar Barley_Spring
        Command:
          [Nodule].FixationMetabolicCost.FixedValue = 0
          [Nodule].FixationRate.FixedValue = 0
          [Phenology].CanopyExpanding.Target.FixedValue = 848.0
          [Phenology].Senescing.Target.FixedValue = 300
          [Phenology].YieldIncreasing.Target.FixedValue = 652.0
          [Product].DryMatterContent.FixedValue = 0.87
          [Product].ExpectedYield.FixedValue = 800
          [Product].HarvestIndex.FixedValue = 0.46
          [Product].MaximumNConc.FixedValue = 0.012
          [Product].MinimumNConc.FixedValue = 0.0084
          [Root].KLModifier.XYPairs.Y = 1,1,1,1,1,1,1,0.807,0.651,0.526,0.424,0.343,0.276,0.223,0.18,0.145,0.117,0.095,0.076,0.062,0,0,0,0,0,0,0,0,0,0
          [Root].MaximumNConc.FixedValue = 0.009
          [Root].MaximumRootDepth.FixedValue = 1000
          [Root].MinimumNConc.FixedValue = 0.009
          [Root].RootProportion.FixedValue = 0.1
          [Stover].CoverFunction.Expanding.SigCoverFunction.Xo.FixedValue = 540
          [Stover].CoverFunction.Expanding.SigCoverFunction.Ymax.FixedValue = 0.96
          [Stover].CoverFunction.Expanding.SigCoverFunction.b.FixedValue = 120
          [Stover].MaximumNConc.FixedValue = 0.005
          [Stover].MinimumNConc.FixedValue = 0.005
          [Stover].XoBiomass.FixedValue = 900.0
          [Stover].bBiomass.FixedValue = 180.0
      Cultivar Barley_SpringForage
        Command:
          [Nodule].FixationMetabolicCost.FixedValue = 0
          [Nodule].FixationRate.FixedValue = 0
          [Phenology].CanopyExpanding.Target.FixedValue = 326.0
          [Phenology].Senescing.Target.FixedValue = 300
          [Phenology].YieldIncreasing.Target.FixedValue = 1174.0
          [Product].DryMatterContent.FixedValue = 0.4
          [Product].ExpectedYield.FixedValue = 2000
          [Product].HarvestIndex.FixedValue = 0.95
          [Product].MaximumNConc.FixedValue = 0.013
          [Product].MinimumNConc.FixedValue = 0.0091
          [Root].KLModifier.XYPairs.Y = 1,1,1,1,1,1,1,0.882,0.779,0.687,0.607,0.535,0.472,0.417,0.368,0.325,0.287,0.253,0.223,0.197,0.174,0.153,0.135,0.119,0.105,0.093,0.082,0.072,0.064,0.056
          [Root].MaximumNConc.FixedValue = 0.009
          [Root].MaximumRootDepth.FixedValue = 1500
          [Root].MinimumNConc.FixedValue = 0.009
          [Root].RootProportion.FixedValue = 0.1
          [Stover].CoverFunction.Expanding.SigCoverFunction.Xo.FixedValue = 540
          [Stover].CoverFunction.Expanding.SigCoverFunction.Ymax.FixedValue = 0.96
          [Stover].CoverFunction.Expanding.SigCoverFunction.b.FixedValue = 120
          [Stover].MaximumNConc.FixedValue = 0.005
          [Stover].MinimumNConc.FixedValue = 0.005
          [Stover].XoBiomass.FixedValue = 900.0
          [Stover].bBiomass.FixedValue = 180.0
      Cultivar Beets
        Command:
          [Nodule].FixationMetabolicCost.FixedValue = 0
          [Nodule].FixationRate.FixedValue = 0
          [Phenology].CanopyExpanding.Target.FixedValue = 874.0
          [Phenology].Senescing.Target.FixedValue = 750
          [Phenology].YieldIncreasing.Target.FixedValue = 1076.0
          [Product].DryMatterContent.FixedValue = 0.14
          [Product].ExpectedYield.FixedValue = 5500
          [Product].HarvestIndex.FixedValue = 0.815
          [Product].MaximumNConc.FixedValue = 0.015
          [Product].MinimumNConc.FixedValue = 0.0105
          [Root].KLModifier.XYPairs.Y = 1,1,1,1,1,1,1,0.472,0.223,0.105,0,0,0,0,0,0,0,0,0,0,0,0,0,0,0,0,0,0,0,0
          [Root].MaximumNConc.FixedValue = 0.01
          [Root].MaximumRootDepth.FixedValue = 500
          [Root].MinimumNConc.FixedValue = 0.01
          [Root].RootProportion.FixedValue = 0.1
          [Stover].CoverFunction.Expanding.SigCoverFunction.Xo.FixedValue = 690
          [Stover].CoverFunction.Expanding.SigCoverFunction.Ymax.FixedValue = 0.95
          [Stover].CoverFunction.Expanding.SigCoverFunction.b.FixedValue = 120
          [Stover].MaximumNConc.FixedValue = 0.02
          [Stover].MinimumNConc.FixedValue = 0.02
          [Stover].XoBiomass.FixedValue = 1350.0
          [Stover].bBiomass.FixedValue = 270.0
      Cultivar Beets_Seed
        Command:
          [Nodule].FixationMetabolicCost.FixedValue = 0
          [Nodule].FixationRate.FixedValue = 0
          [Phenology].CanopyExpanding.Target.FixedValue = 1831.0
          [Phenology].Senescing.Target.FixedValue = 300
          [Phenology].YieldIncreasing.Target.FixedValue = 1169.0
          [Product].DryMatterContent.FixedValue = 0.85
          [Product].ExpectedYield.FixedValue = 150
          [Product].HarvestIndex.FixedValue = 0.2
          [Product].MaximumNConc.FixedValue = 0.03
          [Product].MinimumNConc.FixedValue = 0.0105
          [Root].KLModifier.XYPairs.Y = 1,1,1,1,1,1,1,0.472,0.223,0.105,0,0,0,0,0,0,0,0,0,0,0,0,0,0,0,0,0,0,0,0
          [Root].MaximumNConc.FixedValue = 0.01
          [Root].MaximumRootDepth.FixedValue = 500
          [Root].MinimumNConc.FixedValue = 0.01
          [Root].RootProportion.FixedValue = 0.1
          [Stover].CoverFunction.Expanding.SigCoverFunction.Xo.FixedValue = 690
          [Stover].CoverFunction.Expanding.SigCoverFunction.Ymax.FixedValue = 0.95
          [Stover].CoverFunction.Expanding.SigCoverFunction.b.FixedValue = 120
          [Stover].MaximumNConc.FixedValue = 0.02
          [Stover].MinimumNConc.FixedValue = 0.02
          [Stover].XoBiomass.FixedValue = 1650.0
          [Stover].bBiomass.FixedValue = 330.0
      Cultivar Brassica
        Command:
          [Nodule].FixationMetabolicCost.FixedValue = 0
          [Nodule].FixationRate.FixedValue = 0
          [Phenology].CanopyExpanding.Target.FixedValue = 420.0
          [Phenology].Senescing.Target.FixedValue = 0
          [Phenology].YieldIncreasing.Target.FixedValue = 1230.0
          [Product].DryMatterContent.FixedValue = 1.0
          [Product].ExpectedYield.FixedValue = 800
          [Product].HarvestIndex.FixedValue = 0.9
          [Product].MaximumNConc.FixedValue = 0.03
          [Product].MinimumNConc.FixedValue = 0.021
          [Root].KLModifier.XYPairs.Y = 1,1,1,1,1,1,1,0.687,0.472,0.325,0.223,0.153,0.105,0.072,0,0,0,0,0,0,0,0,0,0,0,0,0,0,0,0
          [Root].MaximumNConc.FixedValue = 0.01
          [Root].MaximumRootDepth.FixedValue = 700
          [Root].MinimumNConc.FixedValue = 0.01
          [Root].RootProportion.FixedValue = 0.1
          [Stover].CoverFunction.Expanding.SigCoverFunction.Xo.FixedValue = 690
          [Stover].CoverFunction.Expanding.SigCoverFunction.Ymax.FixedValue = 0.96
          [Stover].CoverFunction.Expanding.SigCoverFunction.b.FixedValue = 60
          [Stover].MaximumNConc.FixedValue = 0.03
          [Stover].MinimumNConc.FixedValue = 0.03
          [Stover].XoBiomass.FixedValue = 825.0
          [Stover].bBiomass.FixedValue = 165.0
      Cultivar Broccoli_Seed
        Command:
          [Nodule].FixationMetabolicCost.FixedValue = 0
          [Nodule].FixationRate.FixedValue = 0
          [Phenology].CanopyExpanding.Target.FixedValue = 1064.0
          [Phenology].Senescing.Target.FixedValue = 300
          [Phenology].YieldIncreasing.Target.FixedValue = 436.0
          [Product].DryMatterContent.FixedValue = 0.84
          [Product].ExpectedYield.FixedValue = 150
          [Product].HarvestIndex.FixedValue = 0.1
          [Product].MaximumNConc.FixedValue = 0.03
          [Product].MinimumNConc.FixedValue = 0.02
          [Root].KLModifier.XYPairs.Y = 1,1,1,1,1,1,1,0.807,0.651,0.526,0.424,0.343,0.276,0.223,0.18,0.145,0.117,0.095,0.076,0.062,0,0,0,0,0,0,0,0,0,0
          [Root].MaximumNConc.FixedValue = 0.008
          [Root].MaximumRootDepth.FixedValue = 1000
          [Root].MinimumNConc.FixedValue = 0.008
          [Root].RootProportion.FixedValue = 0.1
          [Stover].CoverFunction.Expanding.SigCoverFunction.Xo.FixedValue = 540
          [Stover].CoverFunction.Expanding.SigCoverFunction.Ymax.FixedValue = 0.96
          [Stover].CoverFunction.Expanding.SigCoverFunction.b.FixedValue = 120
          [Stover].MaximumNConc.FixedValue = 0.02
          [Stover].MinimumNConc.FixedValue = 0.02
          [Stover].XoBiomass.FixedValue = 900.0
          [Stover].bBiomass.FixedValue = 180.0
      Cultivar Broccoli_summer
        Command:
          [Nodule].FixationMetabolicCost.FixedValue = 0
          [Nodule].FixationRate.FixedValue = 0
          [Phenology].CanopyExpanding.Target.FixedValue = 1664.0
          [Phenology].Senescing.Target.FixedValue = 900
          [Phenology].YieldIncreasing.Target.FixedValue = 436.0
          [Product].DryMatterContent.FixedValue = 0.11
          [Product].ExpectedYield.FixedValue = 1200
          [Product].HarvestIndex.FixedValue = 0.2
          [Product].MaximumNConc.FixedValue = 0.035
          [Product].MinimumNConc.FixedValue = 0.0245
          [Root].KLModifier.XYPairs.Y = 1,1,1,1,1,1,1,0.472,0.223,0.105,0,0,0,0,0,0,0,0,0,0,0,0,0,0,0,0,0,0,0,0
          [Root].MaximumNConc.FixedValue = 0.009
          [Root].MaximumRootDepth.FixedValue = 500
          [Root].MinimumNConc.FixedValue = 0.009
          [Root].RootProportion.FixedValue = 0.1
          [Stover].CoverFunction.Expanding.SigCoverFunction.Xo.FixedValue = 450
          [Stover].CoverFunction.Expanding.SigCoverFunction.Ymax.FixedValue = 0.8
          [Stover].CoverFunction.Expanding.SigCoverFunction.b.FixedValue = 120
          [Stover].MaximumNConc.FixedValue = 0.038
          [Stover].MinimumNConc.FixedValue = 0.038
          [Stover].XoBiomass.FixedValue = 1500.0
          [Stover].bBiomass.FixedValue = 300.0
      Cultivar Broccoli_winter_spring
        Command:
          [Nodule].FixationMetabolicCost.FixedValue = 0
          [Nodule].FixationRate.FixedValue = 0
          [Phenology].CanopyExpanding.Target.FixedValue = 1739.0
          [Phenology].Senescing.Target.FixedValue = 900
          [Phenology].YieldIncreasing.Target.FixedValue = 361.0
          [Product].DryMatterContent.FixedValue = 0.11
          [Product].ExpectedYield.FixedValue = 800
          [Product].HarvestIndex.FixedValue = 0.13
          [Product].MaximumNConc.FixedValue = 0.035
          [Product].MinimumNConc.FixedValue = 0.0245
          [Root].KLModifier.XYPairs.Y = 1,1,1,1,1,1,1,0.472,0.223,0.105,0,0,0,0,0,0,0,0,0,0,0,0,0,0,0,0,0,0,0,0
          [Root].MaximumNConc.FixedValue = 0.009
          [Root].MaximumRootDepth.FixedValue = 500
          [Root].MinimumNConc.FixedValue = 0.009
          [Root].RootProportion.FixedValue = 0.1
          [Stover].CoverFunction.Expanding.SigCoverFunction.Xo.FixedValue = 450
          [Stover].CoverFunction.Expanding.SigCoverFunction.Ymax.FixedValue = 0.8
          [Stover].CoverFunction.Expanding.SigCoverFunction.b.FixedValue = 120
          [Stover].MaximumNConc.FixedValue = 0.038
          [Stover].MinimumNConc.FixedValue = 0.038
          [Stover].XoBiomass.FixedValue = 1500.0
          [Stover].bBiomass.FixedValue = 300.0
      Cultivar BrusselSprouts
        Command:
          [Nodule].FixationMetabolicCost.FixedValue = 0
          [Nodule].FixationRate.FixedValue = 0
          [Phenology].CanopyExpanding.Target.FixedValue = 1470.0
          [Phenology].Senescing.Target.FixedValue = 900
          [Phenology].YieldIncreasing.Target.FixedValue = 630.0
          [Product].DryMatterContent.FixedValue = 0.2
          [Product].ExpectedYield.FixedValue = 1500
          [Product].HarvestIndex.FixedValue = 0.4
          [Product].MaximumNConc.FixedValue = 0.035
          [Product].MinimumNConc.FixedValue = 0.0245
          [Root].KLModifier.XYPairs.Y = 1,1,1,1,1,1,1,0.472,0.223,0.105,0,0,0,0,0,0,0,0,0,0,0,0,0,0,0,0,0,0,0,0
          [Root].MaximumNConc.FixedValue = 0.009
          [Root].MaximumRootDepth.FixedValue = 500
          [Root].MinimumNConc.FixedValue = 0.009
          [Root].RootProportion.FixedValue = 0.1
          [Stover].CoverFunction.Expanding.SigCoverFunction.Xo.FixedValue = 450
          [Stover].CoverFunction.Expanding.SigCoverFunction.Ymax.FixedValue = 0.8
          [Stover].CoverFunction.Expanding.SigCoverFunction.b.FixedValue = 120
          [Stover].MaximumNConc.FixedValue = 0.038
          [Stover].MinimumNConc.FixedValue = 0.038
          [Stover].XoBiomass.FixedValue = 1500.0
          [Stover].bBiomass.FixedValue = 300.0
      Cultivar Cabbage_summer
        Command:
          [Nodule].FixationMetabolicCost.FixedValue = 0
          [Nodule].FixationRate.FixedValue = 0
          [Phenology].CanopyExpanding.Target.FixedValue = 1080.0
          [Phenology].Senescing.Target.FixedValue = 900
          [Phenology].YieldIncreasing.Target.FixedValue = 1020.0
          [Product].DryMatterContent.FixedValue = 0.08
          [Product].ExpectedYield.FixedValue = 7000
          [Product].HarvestIndex.FixedValue = 0.75
          [Product].MaximumNConc.FixedValue = 0.026
          [Product].MinimumNConc.FixedValue = 0.0182
          [Root].KLModifier.XYPairs.Y = 1,1,1,1,1,1,1,0.472,0.223,0.105,0,0,0,0,0,0,0,0,0,0,0,0,0,0,0,0,0,0,0,0
          [Root].MaximumNConc.FixedValue = 0.009
          [Root].MaximumRootDepth.FixedValue = 500
          [Root].MinimumNConc.FixedValue = 0.009
          [Root].RootProportion.FixedValue = 0.1
          [Stover].CoverFunction.Expanding.SigCoverFunction.Xo.FixedValue = 360
          [Stover].CoverFunction.Expanding.SigCoverFunction.Ymax.FixedValue = 0.8
          [Stover].CoverFunction.Expanding.SigCoverFunction.b.FixedValue = 120
          [Stover].MaximumNConc.FixedValue = 0.03
          [Stover].MinimumNConc.FixedValue = 0.03
          [Stover].XoBiomass.FixedValue = 1500.0
          [Stover].bBiomass.FixedValue = 300.0
      Cultivar Cabbage_winter_spring
        Command:
          [Nodule].FixationMetabolicCost.FixedValue = 0
          [Nodule].FixationRate.FixedValue = 0
          [Phenology].CanopyExpanding.Target.FixedValue = 1269.0
          [Phenology].Senescing.Target.FixedValue = 900
          [Phenology].YieldIncreasing.Target.FixedValue = 831.0
          [Product].DryMatterContent.FixedValue = 0.12
          [Product].ExpectedYield.FixedValue = 5000
          [Product].HarvestIndex.FixedValue = 0.6
          [Product].MaximumNConc.FixedValue = 0.026
          [Product].MinimumNConc.FixedValue = 0.0182
          [Root].KLModifier.XYPairs.Y = 1,1,1,1,1,1,1,0.472,0.223,0.105,0,0,0,0,0,0,0,0,0,0,0,0,0,0,0,0,0,0,0,0
          [Root].MaximumNConc.FixedValue = 0.009
          [Root].MaximumRootDepth.FixedValue = 500
          [Root].MinimumNConc.FixedValue = 0.009
          [Root].RootProportion.FixedValue = 0.1
          [Stover].CoverFunction.Expanding.SigCoverFunction.Xo.FixedValue = 360
          [Stover].CoverFunction.Expanding.SigCoverFunction.Ymax.FixedValue = 0.8
          [Stover].CoverFunction.Expanding.SigCoverFunction.b.FixedValue = 120
          [Stover].MaximumNConc.FixedValue = 0.03
          [Stover].MinimumNConc.FixedValue = 0.03
          [Stover].XoBiomass.FixedValue = 1500.0
          [Stover].bBiomass.FixedValue = 300.0
      Cultivar Carrots
        Command:
          [Nodule].FixationMetabolicCost.FixedValue = 0
          [Nodule].FixationRate.FixedValue = 0
          [Phenology].CanopyExpanding.Target.FixedValue = 955.0
          [Phenology].Senescing.Target.FixedValue = 750
          [Phenology].YieldIncreasing.Target.FixedValue = 2045.0
          [Product].DryMatterContent.FixedValue = 0.12
          [Product].ExpectedYield.FixedValue = 7000
          [Product].HarvestIndex.FixedValue = 0.9
          [Product].MaximumNConc.FixedValue = 0.01
          [Product].MinimumNConc.FixedValue = 0.007
          [Root].KLModifier.XYPairs.Y = 1,1,1,1,1,1,1,0.472,0.223,0.105,0,0,0,0,0,0,0,0,0,0,0,0,0,0,0,0,0,0,0,0
          [Root].MaximumNConc.FixedValue = 0.01
          [Root].MaximumRootDepth.FixedValue = 500
          [Root].MinimumNConc.FixedValue = 0.01
          [Root].RootProportion.FixedValue = 0.1
          [Stover].CoverFunction.Expanding.SigCoverFunction.Xo.FixedValue = 690
          [Stover].CoverFunction.Expanding.SigCoverFunction.Ymax.FixedValue = 0.9
          [Stover].CoverFunction.Expanding.SigCoverFunction.b.FixedValue = 120
          [Stover].MaximumNConc.FixedValue = 0.02
          [Stover].MinimumNConc.FixedValue = 0.02
          [Stover].XoBiomass.FixedValue = 1875.0
          [Stover].bBiomass.FixedValue = 375.0
      Cultivar Cauliflower_summer
        Command:
          [Nodule].FixationMetabolicCost.FixedValue = 0
          [Nodule].FixationRate.FixedValue = 0
          [Phenology].CanopyExpanding.Target.FixedValue = 1422.0
          [Phenology].Senescing.Target.FixedValue = 900
          [Phenology].YieldIncreasing.Target.FixedValue = 678.0
          [Product].DryMatterContent.FixedValue = 0.09
          [Product].ExpectedYield.FixedValue = 5000
          [Product].HarvestIndex.FixedValue = 0.45
          [Product].MaximumNConc.FixedValue = 0.035
          [Product].MinimumNConc.FixedValue = 0.0245
          [Root].KLModifier.XYPairs.Y = 1,1,1,1,1,1,1,0.472,0.223,0.105,0,0,0,0,0,0,0,0,0,0,0,0,0,0,0,0,0,0,0,0
          [Root].MaximumNConc.FixedValue = 0.009
          [Root].MaximumRootDepth.FixedValue = 500
          [Root].MinimumNConc.FixedValue = 0.009
          [Root].RootProportion.FixedValue = 0.1
          [Stover].CoverFunction.Expanding.SigCoverFunction.Xo.FixedValue = 450
          [Stover].CoverFunction.Expanding.SigCoverFunction.Ymax.FixedValue = 0.8
          [Stover].CoverFunction.Expanding.SigCoverFunction.b.FixedValue = 120
          [Stover].MaximumNConc.FixedValue = 0.038
          [Stover].MinimumNConc.FixedValue = 0.038
          [Stover].XoBiomass.FixedValue = 1500.0
          [Stover].bBiomass.FixedValue = 300.0
      Cultivar Cauliflower_winter_spring
        Command:
          [Nodule].FixationMetabolicCost.FixedValue = 0
          [Nodule].FixationRate.FixedValue = 0
          [Phenology].CanopyExpanding.Target.FixedValue = 1566.0
          [Phenology].Senescing.Target.FixedValue = 900
          [Phenology].YieldIncreasing.Target.FixedValue = 534.0
          [Product].DryMatterContent.FixedValue = 0.1
          [Product].ExpectedYield.FixedValue = 3000
          [Product].HarvestIndex.FixedValue = 0.3
          [Product].MaximumNConc.FixedValue = 0.035
          [Product].MinimumNConc.FixedValue = 0.0245
          [Root].KLModifier.XYPairs.Y = 1,1,1,1,1,1,1,0.472,0.223,0.105,0,0,0,0,0,0,0,0,0,0,0,0,0,0,0,0,0,0,0,0
          [Root].MaximumNConc.FixedValue = 0.009
          [Root].MaximumRootDepth.FixedValue = 500
          [Root].MinimumNConc.FixedValue = 0.009
          [Root].RootProportion.FixedValue = 0.1
          [Stover].CoverFunction.Expanding.SigCoverFunction.Xo.FixedValue = 450
          [Stover].CoverFunction.Expanding.SigCoverFunction.Ymax.FixedValue = 0.8
          [Stover].CoverFunction.Expanding.SigCoverFunction.b.FixedValue = 120
          [Stover].MaximumNConc.FixedValue = 0.038
          [Stover].MinimumNConc.FixedValue = 0.038
          [Stover].XoBiomass.FixedValue = 1500.0
          [Stover].bBiomass.FixedValue = 300.0
      Cultivar Chicory_Seed
        Command:
          [Nodule].FixationMetabolicCost.FixedValue = 0
          [Nodule].FixationRate.FixedValue = 0
          [Phenology].CanopyExpanding.Target.FixedValue = 2017.0
          [Phenology].Senescing.Target.FixedValue = 300
          [Phenology].YieldIncreasing.Target.FixedValue = 983.0
          [Product].DryMatterContent.FixedValue = 0.85
          [Product].ExpectedYield.FixedValue = 150
          [Product].HarvestIndex.FixedValue = 0.05
          [Product].MaximumNConc.FixedValue = 0.03
          [Product].MinimumNConc.FixedValue = 0.0105
          [Root].KLModifier.XYPairs.Y = 1,1,1,1,1,1,1,0.472,0.223,0.105,0,0,0,0,0,0,0,0,0,0,0,0,0,0,0,0,0,0,0,0
          [Root].MaximumNConc.FixedValue = 0.01
          [Root].MaximumRootDepth.FixedValue = 500
          [Root].MinimumNConc.FixedValue = 0.01
          [Root].RootProportion.FixedValue = 0.1
          [Stover].CoverFunction.Expanding.SigCoverFunction.Xo.FixedValue = 690
          [Stover].CoverFunction.Expanding.SigCoverFunction.Ymax.FixedValue = 0.95
          [Stover].CoverFunction.Expanding.SigCoverFunction.b.FixedValue = 120
          [Stover].MaximumNConc.FixedValue = 0.02
          [Stover].MinimumNConc.FixedValue = 0.02
          [Stover].XoBiomass.FixedValue = 1650.0
          [Stover].bBiomass.FixedValue = 330.0
      Cultivar Clover_1styear
        Command:
          [Nodule].FixationMetabolicCost.FixedValue = 0
          [Nodule].FixationRate.FixedValue = 1000
          [Phenology].CanopyExpanding.Target.FixedValue = 2141.0
          [Phenology].Senescing.Target.FixedValue = 300
          [Phenology].YieldIncreasing.Target.FixedValue = 1159.0
          [Product].DryMatterContent.FixedValue = 0.85
          [Product].ExpectedYield.FixedValue = 60
          [Product].HarvestIndex.FixedValue = 0.09
          [Product].MaximumNConc.FixedValue = 0.035
          [Product].MinimumNConc.FixedValue = 0.0245
          [Root].KLModifier.XYPairs.Y = 1,1,1,1,1,1,1,0.779,0.607,0.472,0.368,0.287,0.223,0.174,0.135,0.105,0.082,0.064,0,0,0,0,0,0,0,0,0,0,0,0
          [Root].MaximumNConc.FixedValue = 0.01
          [Root].MaximumRootDepth.FixedValue = 900
          [Root].MinimumNConc.FixedValue = 0.01
          [Root].RootProportion.FixedValue = 0.1
          [Stover].CoverFunction.Expanding.SigCoverFunction.Xo.FixedValue = 750
          [Stover].CoverFunction.Expanding.SigCoverFunction.Ymax.FixedValue = 0.8
          [Stover].CoverFunction.Expanding.SigCoverFunction.b.FixedValue = 120
          [Stover].MaximumNConc.FixedValue = 0.04
          [Stover].MinimumNConc.FixedValue = 0.04
          [Stover].XoBiomass.FixedValue = 1800.0
          [Stover].bBiomass.FixedValue = 360.0
      Cultivar Clover_2ndyear
        Command:
          [Nodule].FixationMetabolicCost.FixedValue = 0
          [Nodule].FixationRate.FixedValue = 1000
          [Phenology].CanopyExpanding.Target.FixedValue = 1249.0
          [Phenology].Senescing.Target.FixedValue = 300
          [Phenology].YieldIncreasing.Target.FixedValue = 551.0
          [Product].DryMatterContent.FixedValue = 0.85
          [Product].ExpectedYield.FixedValue = 60
          [Product].HarvestIndex.FixedValue = 0.09
          [Product].MaximumNConc.FixedValue = 0.035
          [Product].MinimumNConc.FixedValue = 0.0245
          [Root].KLModifier.XYPairs.Y = 1,1,1,1,1,1,1,0.779,0.607,0.472,0.368,0.287,0.223,0.174,0.135,0.105,0.082,0.064,0,0,0,0,0,0,0,0,0,0,0,0
          [Root].MaximumNConc.FixedValue = 0.01
          [Root].MaximumRootDepth.FixedValue = 900
          [Root].MinimumNConc.FixedValue = 0.01
          [Root].RootProportion.FixedValue = 0.1
          [Stover].CoverFunction.Expanding.SigCoverFunction.Xo.FixedValue = 300
          [Stover].CoverFunction.Expanding.SigCoverFunction.Ymax.FixedValue = 0.96
          [Stover].CoverFunction.Expanding.SigCoverFunction.b.FixedValue = 120
          [Stover].MaximumNConc.FixedValue = 0.04
          [Stover].MinimumNConc.FixedValue = 0.04
          [Stover].XoBiomass.FixedValue = 1050.0
          [Stover].bBiomass.FixedValue = 210.0
      Cultivar Dried_Beans
        Command:
          [Nodule].FixationMetabolicCost.FixedValue = 0
          [Nodule].FixationRate.FixedValue = 1000
          [Phenology].CanopyExpanding.Target.FixedValue = 755.0
          [Phenology].Senescing.Target.FixedValue = 300
          [Phenology].YieldIncreasing.Target.FixedValue = 595.0
          [Product].DryMatterContent.FixedValue = 0.86
          [Product].ExpectedYield.FixedValue = 350
          [Product].HarvestIndex.FixedValue = 0.5
          [Product].MaximumNConc.FixedValue = 0.035
          [Product].MinimumNConc.FixedValue = 0.0245
          [Root].KLModifier.XYPairs.Y = 1,1,1,1,1,1,1,0.687,0.472,0.325,0.223,0.153,0.105,0.072,0,0,0,0,0,0,0,0,0,0,0,0,0,0,0,0
          [Root].MaximumNConc.FixedValue = 0.015
          [Root].MaximumRootDepth.FixedValue = 700
          [Root].MinimumNConc.FixedValue = 0.015
          [Root].RootProportion.FixedValue = 0.1
          [Stover].CoverFunction.Expanding.SigCoverFunction.Xo.FixedValue = 690
          [Stover].CoverFunction.Expanding.SigCoverFunction.Ymax.FixedValue = 0.96
          [Stover].CoverFunction.Expanding.SigCoverFunction.b.FixedValue = 60
          [Stover].MaximumNConc.FixedValue = 0.02
          [Stover].MinimumNConc.FixedValue = 0.02
          [Stover].XoBiomass.FixedValue = 825.0
          [Stover].bBiomass.FixedValue = 165.0
      Cultivar Dried_Peas
        Command:
          [Nodule].FixationMetabolicCost.FixedValue = 0
          [Nodule].FixationRate.FixedValue = 1000
          [Phenology].CanopyExpanding.Target.FixedValue = 755.0
          [Phenology].Senescing.Target.FixedValue = 300
          [Phenology].YieldIncreasing.Target.FixedValue = 595.0
          [Product].DryMatterContent.FixedValue = 0.86
          [Product].ExpectedYield.FixedValue = 350
          [Product].HarvestIndex.FixedValue = 0.5
          [Product].MaximumNConc.FixedValue = 0.035
          [Product].MinimumNConc.FixedValue = 0.0245
          [Root].KLModifier.XYPairs.Y = 1,1,1,1,1,1,1,0.846,0.717,0.607,0.513,0.435,0.368,0.311,0.264,0.223,0.189,0.16,0.135,0.115,0.097,0.082,0.069,0.059,0,0,0,0,0,0
          [Root].MaximumNConc.FixedValue = 0.015
          [Root].MaximumRootDepth.FixedValue = 1200
          [Root].MinimumNConc.FixedValue = 0.015
          [Root].RootProportion.FixedValue = 0.1
          [Stover].CoverFunction.Expanding.SigCoverFunction.Xo.FixedValue = 690
          [Stover].CoverFunction.Expanding.SigCoverFunction.Ymax.FixedValue = 0.96
          [Stover].CoverFunction.Expanding.SigCoverFunction.b.FixedValue = 60
          [Stover].MaximumNConc.FixedValue = 0.02
          [Stover].MinimumNConc.FixedValue = 0.02
          [Stover].XoBiomass.FixedValue = 825.0
          [Stover].bBiomass.FixedValue = 165.0
      Cultivar Green_Beans
        Command:
          [Nodule].FixationMetabolicCost.FixedValue = 0
          [Nodule].FixationRate.FixedValue = 1000
          [Phenology].CanopyExpanding.Target.FixedValue = 782.0
          [Phenology].Senescing.Target.FixedValue = 300
          [Phenology].YieldIncreasing.Target.FixedValue = 568.0
          [Product].DryMatterContent.FixedValue = 0.21
          [Product].ExpectedYield.FixedValue = 800
          [Product].HarvestIndex.FixedValue = 0.45
          [Product].MaximumNConc.FixedValue = 0.035
          [Product].MinimumNConc.FixedValue = 0.0245
          [Root].KLModifier.XYPairs.Y = 1,1,1,1,1,1,1,0.687,0.472,0.325,0.223,0.153,0.105,0.072,0,0,0,0,0,0,0,0,0,0,0,0,0,0,0,0
          [Root].MaximumNConc.FixedValue = 0.015
          [Root].MaximumRootDepth.FixedValue = 700
          [Root].MinimumNConc.FixedValue = 0.015
          [Root].RootProportion.FixedValue = 0.1
          [Stover].CoverFunction.Expanding.SigCoverFunction.Xo.FixedValue = 690
          [Stover].CoverFunction.Expanding.SigCoverFunction.Ymax.FixedValue = 0.8
          [Stover].CoverFunction.Expanding.SigCoverFunction.b.FixedValue = 60
          [Stover].MaximumNConc.FixedValue = 0.03
          [Stover].MinimumNConc.FixedValue = 0.03
          [Stover].XoBiomass.FixedValue = 825.0
          [Stover].bBiomass.FixedValue = 165.0
      Cultivar Green_Peas
        Command:
          [Nodule].FixationMetabolicCost.FixedValue = 0
          [Nodule].FixationRate.FixedValue = 1000
          [Phenology].CanopyExpanding.Target.FixedValue = 782.0
          [Phenology].Senescing.Target.FixedValue = 300
          [Phenology].YieldIncreasing.Target.FixedValue = 568.0
          [Product].DryMatterContent.FixedValue = 0.21
          [Product].ExpectedYield.FixedValue = 800
          [Product].HarvestIndex.FixedValue = 0.45
          [Product].MaximumNConc.FixedValue = 0.035
          [Product].MinimumNConc.FixedValue = 0.0245
          [Root].KLModifier.XYPairs.Y = 1,1,1,1,1,1,1,0.846,0.717,0.607,0.513,0.435,0.368,0.311,0.264,0.223,0.189,0.16,0.135,0.115,0.097,0.082,0.069,0.059,0,0,0,0,0,0
          [Root].MaximumNConc.FixedValue = 0.015
          [Root].MaximumRootDepth.FixedValue = 1200
          [Root].MinimumNConc.FixedValue = 0.015
          [Root].RootProportion.FixedValue = 0.1
          [Stover].CoverFunction.Expanding.SigCoverFunction.Xo.FixedValue = 690
          [Stover].CoverFunction.Expanding.SigCoverFunction.Ymax.FixedValue = 0.96
          [Stover].CoverFunction.Expanding.SigCoverFunction.b.FixedValue = 60
          [Stover].MaximumNConc.FixedValue = 0.03
          [Stover].MinimumNConc.FixedValue = 0.03
          [Stover].XoBiomass.FixedValue = 825.0
          [Stover].bBiomass.FixedValue = 165.0
      Cultivar Kale
        Command:
          [Nodule].FixationMetabolicCost.FixedValue = 0
          [Nodule].FixationRate.FixedValue = 0
          [Phenology].CanopyExpanding.Target.FixedValue = 1150.0
          [Phenology].Senescing.Target.FixedValue = 0
          [Phenology].YieldIncreasing.Target.FixedValue = 1850.0
          [Product].DryMatterContent.FixedValue = 0.16
          [Product].ExpectedYield.FixedValue = 7500
          [Product].HarvestIndex.FixedValue = 0.7
          [Product].MaximumNConc.FixedValue = 0.03
          [Product].MinimumNConc.FixedValue = 0.02
          [Root].KLModifier.XYPairs.Y = 1,1,1,1,1,1,1,0.946,0.895,0.846,0.801,0.757,0.717,0.678,0.641,0.607,0.574,0.543,0.513,0.486,0.459,0.435,0.411,0.389,0.368,0.348,0.329,0.311,0.295,0.279
          [Root].MaximumNConc.FixedValue = 0.008
          [Root].MaximumRootDepth.FixedValue = 3000
          [Root].MinimumNConc.FixedValue = 0.008
          [Root].RootProportion.FixedValue = 0.1
          [Stover].CoverFunction.Expanding.SigCoverFunction.Xo.FixedValue = 867
          [Stover].CoverFunction.Expanding.SigCoverFunction.Ymax.FixedValue = 0.96
          [Stover].CoverFunction.Expanding.SigCoverFunction.b.FixedValue = 141
          [Stover].MaximumNConc.FixedValue = 0.01
          [Stover].MinimumNConc.FixedValue = 0.01
          [Stover].XoBiomass.FixedValue = 1500.0
          [Stover].bBiomass.FixedValue = 300.0
      Cultivar Kumara
        Command:
          [Nodule].FixationMetabolicCost.FixedValue = 0
          [Nodule].FixationRate.FixedValue = 0
          [Phenology].CanopyExpanding.Target.FixedValue = 716.0
          [Phenology].Senescing.Target.FixedValue = 750
          [Phenology].YieldIncreasing.Target.FixedValue = 1234.0
          [Product].DryMatterContent.FixedValue = 0.23
          [Product].ExpectedYield.FixedValue = 5000
          [Product].HarvestIndex.FixedValue = 0.89
          [Product].MaximumNConc.FixedValue = 0.018
          [Product].MinimumNConc.FixedValue = 0.0126
          [Root].KLModifier.XYPairs.Y = 1,1,1,1,1,1,1,0.472,0.223,0.105,0,0,0,0,0,0,0,0,0,0,0,0,0,0,0,0,0,0,0,0
          [Root].MaximumNConc.FixedValue = 0.01
          [Root].MaximumRootDepth.FixedValue = 500
          [Root].MinimumNConc.FixedValue = 0.01
          [Root].RootProportion.FixedValue = 0.1
          [Stover].CoverFunction.Expanding.SigCoverFunction.Xo.FixedValue = 690
          [Stover].CoverFunction.Expanding.SigCoverFunction.Ymax.FixedValue = 0.96
          [Stover].CoverFunction.Expanding.SigCoverFunction.b.FixedValue = 120
          [Stover].MaximumNConc.FixedValue = 0.02
          [Stover].MinimumNConc.FixedValue = 0.02
          [Stover].XoBiomass.FixedValue = 1350.0
          [Stover].bBiomass.FixedValue = 270.0
      Cultivar Lentils: same as Replacements.SCRUM.Dried_Beans
      Cultivar Lettuce
        Command:
          [Nodule].FixationMetabolicCost.FixedValue = 0
          [Nodule].FixationRate.FixedValue = 0
          [Phenology].CanopyExpanding.Target.FixedValue = 1299.0
          [Phenology].Senescing.Target.FixedValue = 600
          [Phenology].YieldIncreasing.Target.FixedValue = 2001.0
          [Product].DryMatterContent.FixedValue = 0.05
          [Product].ExpectedYield.FixedValue = 5000
          [Product].HarvestIndex.FixedValue = 0.8
          [Product].MaximumNConc.FixedValue = 0.026
          [Product].MinimumNConc.FixedValue = 0.0182
          [Root].KLModifier.XYPairs.Y = 1,1,1,1,1,1,1,0.472,0.223,0.105,0,0,0,0,0,0,0,0,0,0,0,0,0,0,0,0,0,0,0,0
          [Root].MaximumNConc.FixedValue = 0.009
          [Root].MaximumRootDepth.FixedValue = 500
          [Root].MinimumNConc.FixedValue = 0.009
          [Root].RootProportion.FixedValue = 0.1
          [Stover].CoverFunction.Expanding.SigCoverFunction.Xo.FixedValue = 360
          [Stover].CoverFunction.Expanding.SigCoverFunction.Ymax.FixedValue = 0.8
          [Stover].CoverFunction.Expanding.SigCoverFunction.b.FixedValue = 120
          [Stover].MaximumNConc.FixedValue = 0.03
          [Stover].MinimumNConc.FixedValue = 0.03
          [Stover].XoBiomass.FixedValue = 1950.0
          [Stover].bBiomass.FixedValue = 390.0
      Cultivar Linseed
        Command:
          [Nodule].FixationMetabolicCost.FixedValue = 0
          [Nodule].FixationRate.FixedValue = 0
          [Phenology].CanopyExpanding.Target.FixedValue = 939.0
          [Phenology].Senescing.Target.FixedValue = 300
          [Phenology].YieldIncreasing.Target.FixedValue = 561.0
          [Product].DryMatterContent.FixedValue = 0.87
          [Product].ExpectedYield.FixedValue = 300
          [Product].HarvestIndex.FixedValue = 0.3
          [Product].MaximumNConc.FixedValue = 0.03
          [Product].MinimumNConc.FixedValue = 0.0091
          [Root].KLModifier.XYPairs.Y = 1,1,1,1,1,1,1,0.807,0.651,0.526,0.424,0.343,0.276,0.223,0.18,0.145,0.117,0.095,0.076,0.062,0,0,0,0,0,0,0,0,0,0
          [Root].MaximumNConc.FixedValue = 0.009
          [Root].MaximumRootDepth.FixedValue = 1000
          [Root].MinimumNConc.FixedValue = 0.009
          [Root].RootProportion.FixedValue = 0.1
          [Stover].CoverFunction.Expanding.SigCoverFunction.Xo.FixedValue = 540
          [Stover].CoverFunction.Expanding.SigCoverFunction.Ymax.FixedValue = 0.96
          [Stover].CoverFunction.Expanding.SigCoverFunction.b.FixedValue = 120
          [Stover].MaximumNConc.FixedValue = 0.01
          [Stover].MinimumNConc.FixedValue = 0.01
          [Stover].XoBiomass.FixedValue = 900.0
          [Stover].bBiomass.FixedValue = 180.0
      Cultivar Lupins
        Command:
          [Nodule].FixationMetabolicCost.FixedValue = 0
          [Nodule].FixationRate.FixedValue = 1000
          [Phenology].CanopyExpanding.Target.FixedValue = 420.0
          [Phenology].Senescing.Target.FixedValue = 0
          [Phenology].YieldIncreasing.Target.FixedValue = 1230.0
          [Product].DryMatterContent.FixedValue = 1.0
          [Product].ExpectedYield.FixedValue = 1200
          [Product].HarvestIndex.FixedValue = 0.9
          [Product].MaximumNConc.FixedValue = 0.03
          [Product].MinimumNConc.FixedValue = 0.021
          [Root].KLModifier.XYPairs.Y = 1,1,1,1,1,1,1,0.687,0.472,0.325,0.223,0.153,0.105,0.072,0,0,0,0,0,0,0,0,0,0,0,0,0,0,0,0
          [Root].MaximumNConc.FixedValue = 0.015
          [Root].MaximumRootDepth.FixedValue = 700
          [Root].MinimumNConc.FixedValue = 0.015
          [Root].RootProportion.FixedValue = 0.1
          [Stover].CoverFunction.Expanding.SigCoverFunction.Xo.FixedValue = 690
          [Stover].CoverFunction.Expanding.SigCoverFunction.Ymax.FixedValue = 0.96
          [Stover].CoverFunction.Expanding.SigCoverFunction.b.FixedValue = 60
          [Stover].MaximumNConc.FixedValue = 0.03
          [Stover].MinimumNConc.FixedValue = 0.03
          [Stover].XoBiomass.FixedValue = 825.0
          [Stover].bBiomass.FixedValue = 165.0
      Cultivar Maize_Long
        Command:
          [Nodule].FixationMetabolicCost.FixedValue = 0
          [Nodule].FixationRate.FixedValue = 0
          [Phenology].CanopyExpanding.Target.FixedValue = 1923.0
          [Phenology].Senescing.Target.FixedValue = 1800
          [Phenology].YieldIncreasing.Target.FixedValue = 477.0
          [Product].DryMatterContent.FixedValue = 0.87
          [Product].ExpectedYield.FixedValue = 1350
          [Product].HarvestIndex.FixedValue = 0.5
          [Product].MaximumNConc.FixedValue = 0.014
          [Product].MinimumNConc.FixedValue = 0.0098
          [Root].KLModifier.XYPairs.Y = 1,1,1,1,1,1,1,0.882,0.779,0.687,0.607,0.535,0.472,0.417,0.368,0.325,0.287,0.253,0.223,0.197,0.174,0.153,0.135,0.119,0.105,0.093,0.082,0.072,0.064,0.056
          [Root].MaximumNConc.FixedValue = 0.007
          [Root].MaximumRootDepth.FixedValue = 1500
          [Root].MinimumNConc.FixedValue = 0.007
          [Root].RootProportion.FixedValue = 0.1
          [Stover].CoverFunction.Expanding.SigCoverFunction.Xo.FixedValue = 1050
          [Stover].CoverFunction.Expanding.SigCoverFunction.Ymax.FixedValue = 0.92
          [Stover].CoverFunction.Expanding.SigCoverFunction.b.FixedValue = 180
          [Stover].MaximumNConc.FixedValue = 0.007
          [Stover].MinimumNConc.FixedValue = 0.007
          [Stover].XoBiomass.FixedValue = 2100.0
          [Stover].bBiomass.FixedValue = 420.0
      Cultivar Maize_Med
        Command:
          [Nodule].FixationMetabolicCost.FixedValue = 0
          [Nodule].FixationRate.FixedValue = 0
          [Phenology].CanopyExpanding.Target.FixedValue = 1785.0
          [Phenology].Senescing.Target.FixedValue = 1650
          [Phenology].YieldIncreasing.Target.FixedValue = 465.0
          [Product].DryMatterContent.FixedValue = 0.87
          [Product].ExpectedYield.FixedValue = 1330
          [Product].HarvestIndex.FixedValue = 0.5
          [Product].MaximumNConc.FixedValue = 0.014
          [Product].MinimumNConc.FixedValue = 0.0098
          [Root].KLModifier.XYPairs.Y = 1,1,1,1,1,1,1,0.882,0.779,0.687,0.607,0.535,0.472,0.417,0.368,0.325,0.287,0.253,0.223,0.197,0.174,0.153,0.135,0.119,0.105,0.093,0.082,0.072,0.064,0.056
          [Root].MaximumNConc.FixedValue = 0.007
          [Root].MaximumRootDepth.FixedValue = 1500
          [Root].MinimumNConc.FixedValue = 0.007
          [Root].RootProportion.FixedValue = 0.1
          [Stover].CoverFunction.Expanding.SigCoverFunction.Xo.FixedValue = 960
          [Stover].CoverFunction.Expanding.SigCoverFunction.Ymax.FixedValue = 0.85
          [Stover].CoverFunction.Expanding.SigCoverFunction.b.FixedValue = 180
          [Stover].MaximumNConc.FixedValue = 0.007
          [Stover].MinimumNConc.FixedValue = 0.007
          [Stover].XoBiomass.FixedValue = 1950.0
          [Stover].bBiomass.FixedValue = 390.0
      Cultivar Maize_Short
        Command:
          [Nodule].FixationMetabolicCost.FixedValue = 0
          [Nodule].FixationRate.FixedValue = 0
          [Phenology].CanopyExpanding.Target.FixedValue = 1648.0
          [Phenology].Senescing.Target.FixedValue = 1500
          [Phenology].YieldIncreasing.Target.FixedValue = 452.0
          [Product].DryMatterContent.FixedValue = 0.87
          [Product].ExpectedYield.FixedValue = 1220
          [Product].HarvestIndex.FixedValue = 0.5
          [Product].MaximumNConc.FixedValue = 0.014
          [Product].MinimumNConc.FixedValue = 0.0098
          [Root].KLModifier.XYPairs.Y = 1,1,1,1,1,1,1,0.882,0.779,0.687,0.607,0.535,0.472,0.417,0.368,0.325,0.287,0.253,0.223,0.197,0.174,0.153,0.135,0.119,0.105,0.093,0.082,0.072,0.064,0.056
          [Root].MaximumNConc.FixedValue = 0.007
          [Root].MaximumRootDepth.FixedValue = 1500
          [Root].MinimumNConc.FixedValue = 0.007
          [Root].RootProportion.FixedValue = 0.1
          [Stover].CoverFunction.Expanding.SigCoverFunction.Xo.FixedValue = 900
          [Stover].CoverFunction.Expanding.SigCoverFunction.Ymax.FixedValue = 0.75
          [Stover].CoverFunction.Expanding.SigCoverFunction.b.FixedValue = 180
          [Stover].MaximumNConc.FixedValue = 0.007
          [Stover].MinimumNConc.FixedValue = 0.007
          [Stover].XoBiomass.FixedValue = 1800.0
          [Stover].bBiomass.FixedValue = 360.0
      Cultivar Maizesilage
        Command:
          [Nodule].FixationMetabolicCost.FixedValue = 0
          [Nodule].FixationRate.FixedValue = 0
          [Phenology].CanopyExpanding.Target.FixedValue = 652.0
          [Phenology].Senescing.Target.FixedValue = 1350
          [Phenology].YieldIncreasing.Target.FixedValue = 1598.0
          [Product].DryMatterContent.FixedValue = 0.35
          [Product].ExpectedYield.FixedValue = 5000
          [Product].HarvestIndex.FixedValue = 0.95
          [Product].MaximumNConc.FixedValue = 0.014
          [Product].MinimumNConc.FixedValue = 0.0098
          [Root].KLModifier.XYPairs.Y = 1,1,1,1,1,1,1,0.882,0.779,0.687,0.607,0.535,0.472,0.417,0.368,0.325,0.287,0.253,0.223,0.197,0.174,0.153,0.135,0.119,0.105,0.093,0.082,0.072,0.064,0.056
          [Root].MaximumNConc.FixedValue = 0.007
          [Root].MaximumRootDepth.FixedValue = 1500
          [Root].MinimumNConc.FixedValue = 0.007
          [Root].RootProportion.FixedValue = 0.1
          [Stover].CoverFunction.Expanding.SigCoverFunction.Xo.FixedValue = 960
          [Stover].CoverFunction.Expanding.SigCoverFunction.Ymax.FixedValue = 0.85
          [Stover].CoverFunction.Expanding.SigCoverFunction.b.FixedValue = 180
          [Stover].MaximumNConc.FixedValue = 0.007
          [Stover].MinimumNConc.FixedValue = 0.007
          [Stover].XoBiomass.FixedValue = 1800.0
          [Stover].bBiomass.FixedValue = 360.0
      Cultivar Mustard
        Command:
          [Nodule].FixationMetabolicCost.FixedValue = 0
          [Nodule].FixationRate.FixedValue = 0
          [Phenology].CanopyExpanding.Target.FixedValue = 420.0
          [Phenology].Senescing.Target.FixedValue = 0
          [Phenology].YieldIncreasing.Target.FixedValue = 1230.0
          [Product].DryMatterContent.FixedValue = 1.0
          [Product].ExpectedYield.FixedValue = 700
          [Product].HarvestIndex.FixedValue = 0.9
          [Product].MaximumNConc.FixedValue = 0.03
          [Product].MinimumNConc.FixedValue = 0.021
          [Root].KLModifier.XYPairs.Y = 1,1,1,1,1,1,1,0.687,0.472,0.325,0.223,0.153,0.105,0.072,0,0,0,0,0,0,0,0,0,0,0,0,0,0,0,0
          [Root].MaximumNConc.FixedValue = 0.01
          [Root].MaximumRootDepth.FixedValue = 700
          [Root].MinimumNConc.FixedValue = 0.01
          [Root].RootProportion.FixedValue = 0.1
          [Stover].CoverFunction.Expanding.SigCoverFunction.Xo.FixedValue = 690
          [Stover].CoverFunction.Expanding.SigCoverFunction.Ymax.FixedValue = 0.96
          [Stover].CoverFunction.Expanding.SigCoverFunction.b.FixedValue = 60
          [Stover].MaximumNConc.FixedValue = 0.03
          [Stover].MinimumNConc.FixedValue = 0.03
          [Stover].XoBiomass.FixedValue = 825.0
          [Stover].bBiomass.FixedValue = 165.0
      Cultivar Mustard_Seed
        Command:
          [Nodule].FixationMetabolicCost.FixedValue = 0
          [Nodule].FixationRate.FixedValue = 0
          [Phenology].CanopyExpanding.Target.FixedValue = 1064.0
          [Phenology].Senescing.Target.FixedValue = 300
          [Phenology].YieldIncreasing.Target.FixedValue = 436.0
          [Product].DryMatterContent.FixedValue = 0.84
          [Product].ExpectedYield.FixedValue = 100
          [Product].HarvestIndex.FixedValue = 0.1
          [Product].MaximumNConc.FixedValue = 0.03
          [Product].MinimumNConc.FixedValue = 0.02
          [Root].KLModifier.XYPairs.Y = 1,1,1,1,1,1,1,0.807,0.651,0.526,0.424,0.343,0.276,0.223,0.18,0.145,0.117,0.095,0.076,0.062,0,0,0,0,0,0,0,0,0,0
          [Root].MaximumNConc.FixedValue = 0.008
          [Root].MaximumRootDepth.FixedValue = 1000
          [Root].MinimumNConc.FixedValue = 0.008
          [Root].RootProportion.FixedValue = 0.1
          [Stover].CoverFunction.Expanding.SigCoverFunction.Xo.FixedValue = 540
          [Stover].CoverFunction.Expanding.SigCoverFunction.Ymax.FixedValue = 0.96
          [Stover].CoverFunction.Expanding.SigCoverFunction.b.FixedValue = 120
          [Stover].MaximumNConc.FixedValue = 0.02
          [Stover].MinimumNConc.FixedValue = 0.02
          [Stover].XoBiomass.FixedValue = 900.0
          [Stover].bBiomass.FixedValue = 180.0
      Cultivar Oats&Rye
        Command:
          [Nodule].FixationMetabolicCost.FixedValue = 0
          [Nodule].FixationRate.FixedValue = 0
          [Phenology].CanopyExpanding.Target.FixedValue = 458.0
          [Phenology].Senescing.Target.FixedValue = 0
          [Phenology].YieldIncreasing.Target.FixedValue = 1342.0
          [Product].DryMatterContent.FixedValue = 1.0
          [Product].ExpectedYield.FixedValue = 1000
          [Product].HarvestIndex.FixedValue = 0.9
          [Product].MaximumNConc.FixedValue = 0.012
          [Product].MinimumNConc.FixedValue = 0.0084
          [Root].KLModifier.XYPairs.Y = 1,1,1,1,1,1,1,0.807,0.651,0.526,0.424,0.343,0.276,0.223,0.18,0.145,0.117,0.095,0.076,0.062,0,0,0,0,0,0,0,0,0,0
          [Root].MaximumNConc.FixedValue = 0.009
          [Root].MaximumRootDepth.FixedValue = 1000
          [Root].MinimumNConc.FixedValue = 0.009
          [Root].RootProportion.FixedValue = 0.1
          [Stover].CoverFunction.Expanding.SigCoverFunction.Xo.FixedValue = 540
          [Stover].CoverFunction.Expanding.SigCoverFunction.Ymax.FixedValue = 0.96
          [Stover].CoverFunction.Expanding.SigCoverFunction.b.FixedValue = 120
          [Stover].MaximumNConc.FixedValue = 0.012
          [Stover].MinimumNConc.FixedValue = 0.012
          [Stover].XoBiomass.FixedValue = 900.0
          [Stover].bBiomass.FixedValue = 180.0
      Cultivar Oats_Autumn
        Command:
          [Nodule].FixationMetabolicCost.FixedValue = 0
          [Nodule].FixationRate.FixedValue = 0
          [Phenology].CanopyExpanding.Target.FixedValue = 1546.0
          [Phenology].Senescing.Target.FixedValue = 600
          [Phenology].YieldIncreasing.Target.FixedValue = 854.0
          [Product].DryMatterContent.FixedValue = 0.87
          [Product].ExpectedYield.FixedValue = 800
          [Product].HarvestIndex.FixedValue = 0.32
          [Product].MaximumNConc.FixedValue = 0.013
          [Product].MinimumNConc.FixedValue = 0.0091
          [Root].KLModifier.XYPairs.Y = 1,1,1,1,1,1,1,0.882,0.779,0.687,0.607,0.535,0.472,0.417,0.368,0.325,0.287,0.253,0.223,0.197,0.174,0.153,0.135,0.119,0.105,0.093,0.082,0.072,0.064,0.056
          [Root].MaximumNConc.FixedValue = 0.009
          [Root].MaximumRootDepth.FixedValue = 1500
          [Root].MinimumNConc.FixedValue = 0.009
          [Root].RootProportion.FixedValue = 0.1
          [Stover].CoverFunction.Expanding.SigCoverFunction.Xo.FixedValue = 540
          [Stover].CoverFunction.Expanding.SigCoverFunction.Ymax.FixedValue = 0.96
          [Stover].CoverFunction.Expanding.SigCoverFunction.b.FixedValue = 120
          [Stover].MaximumNConc.FixedValue = 0.005
          [Stover].MinimumNConc.FixedValue = 0.005
          [Stover].XoBiomass.FixedValue = 1500.0
          [Stover].bBiomass.FixedValue = 300.0
      Cultivar Oats_AutumnForage
        Command:
          [Nodule].FixationMetabolicCost.FixedValue = 0
          [Nodule].FixationRate.FixedValue = 0
          [Phenology].CanopyExpanding.Target.FixedValue = 543.0
          [Phenology].Senescing.Target.FixedValue = 600
          [Phenology].YieldIncreasing.Target.FixedValue = 1857.0
          [Product].DryMatterContent.FixedValue = 0.4
          [Product].ExpectedYield.FixedValue = 3000
          [Product].HarvestIndex.FixedValue = 0.95
          [Product].MaximumNConc.FixedValue = 0.013
          [Product].MinimumNConc.FixedValue = 0.0091
          [Root].KLModifier.XYPairs.Y = 1,1,1,1,1,1,1,0.882,0.779,0.687,0.607,0.535,0.472,0.417,0.368,0.325,0.287,0.253,0.223,0.197,0.174,0.153,0.135,0.119,0.105,0.093,0.082,0.072,0.064,0.056
          [Root].MaximumNConc.FixedValue = 0.009
          [Root].MaximumRootDepth.FixedValue = 1500
          [Root].MinimumNConc.FixedValue = 0.009
          [Root].RootProportion.FixedValue = 0.1
          [Stover].CoverFunction.Expanding.SigCoverFunction.Xo.FixedValue = 540
          [Stover].CoverFunction.Expanding.SigCoverFunction.Ymax.FixedValue = 0.96
          [Stover].CoverFunction.Expanding.SigCoverFunction.b.FixedValue = 120
          [Stover].MaximumNConc.FixedValue = 0.005
          [Stover].MinimumNConc.FixedValue = 0.005
          [Stover].XoBiomass.FixedValue = 1500.0
          [Stover].bBiomass.FixedValue = 300.0
      Cultivar Oats_Spring
        Command:
          [Nodule].FixationMetabolicCost.FixedValue = 0
          [Nodule].FixationRate.FixedValue = 0
          [Phenology].CanopyExpanding.Target.FixedValue = 939.0
          [Phenology].Senescing.Target.FixedValue = 300
          [Phenology].YieldIncreasing.Target.FixedValue = 561.0
          [Product].DryMatterContent.FixedValue = 0.87
          [Product].ExpectedYield.FixedValue = 400
          [Product].HarvestIndex.FixedValue = 0.3
          [Product].MaximumNConc.FixedValue = 0.012
          [Product].MinimumNConc.FixedValue = 0.0084
          [Root].KLModifier.XYPairs.Y = 1,1,1,1,1,1,1,0.807,0.651,0.526,0.424,0.343,0.276,0.223,0.18,0.145,0.117,0.095,0.076,0.062,0,0,0,0,0,0,0,0,0,0
          [Root].MaximumNConc.FixedValue = 0.009
          [Root].MaximumRootDepth.FixedValue = 1000
          [Root].MinimumNConc.FixedValue = 0.009
          [Root].RootProportion.FixedValue = 0.1
          [Stover].CoverFunction.Expanding.SigCoverFunction.Xo.FixedValue = 540
          [Stover].CoverFunction.Expanding.SigCoverFunction.Ymax.FixedValue = 0.96
          [Stover].CoverFunction.Expanding.SigCoverFunction.b.FixedValue = 120
          [Stover].MaximumNConc.FixedValue = 0.005
          [Stover].MinimumNConc.FixedValue = 0.005
          [Stover].XoBiomass.FixedValue = 900.0
          [Stover].bBiomass.FixedValue = 180.0
      Cultivar Oats_SpringForage: same as Replacements.SCRUM.Barley_SpringForage
      Cultivar Onions
        Command:
          [Nodule].FixationMetabolicCost.FixedValue = 0
          [Nodule].FixationRate.FixedValue = 0
          [Phenology].CanopyExpanding.Target.FixedValue = 899.0
          [Phenology].Senescing.Target.FixedValue = 750
          [Phenology].YieldIncreasing.Target.FixedValue = 1051.0
          [Product].DryMatterContent.FixedValue = 0.11
          [Product].ExpectedYield.FixedValue = 7000
          [Product].HarvestIndex.FixedValue = 0.8
          [Product].MaximumNConc.FixedValue = 0.014
          [Product].MinimumNConc.FixedValue = 0.0098
          [Root].KLModifier.XYPairs.Y = 1,1,1,1,1,1,1,0.223,0,0,0,0,0,0,0,0,0,0,0,0,0,0,0,0,0,0,0,0,0,0
          [Root].MaximumNConc.FixedValue = 0.01
          [Root].MaximumRootDepth.FixedValue = 400
          [Root].MinimumNConc.FixedValue = 0.01
          [Root].RootProportion.FixedValue = 0.1
          [Stover].CoverFunction.Expanding.SigCoverFunction.Xo.FixedValue = 780
          [Stover].CoverFunction.Expanding.SigCoverFunction.Ymax.FixedValue = 0.8
          [Stover].CoverFunction.Expanding.SigCoverFunction.b.FixedValue = 120
          [Stover].MaximumNConc.FixedValue = 0.02
          [Stover].MinimumNConc.FixedValue = 0.02
          [Stover].XoBiomass.FixedValue = 1350.0
          [Stover].bBiomass.FixedValue = 270.0
      Cultivar PakChoi_Seed
        Command:
          [Nodule].FixationMetabolicCost.FixedValue = 0
          [Nodule].FixationRate.FixedValue = 0
          [Phenology].CanopyExpanding.Target.FixedValue = 939.0
          [Phenology].Senescing.Target.FixedValue = 300
          [Phenology].YieldIncreasing.Target.FixedValue = 561.0
          [Product].DryMatterContent.FixedValue = 0.84
          [Product].ExpectedYield.FixedValue = 200
          [Product].HarvestIndex.FixedValue = 0.3
          [Product].MaximumNConc.FixedValue = 0.03
          [Product].MinimumNConc.FixedValue = 0.02
          [Root].KLModifier.XYPairs.Y = 1,1,1,1,1,1,1,0.807,0.651,0.526,0.424,0.343,0.276,0.223,0.18,0.145,0.117,0.095,0.076,0.062,0,0,0,0,0,0,0,0,0,0
          [Root].MaximumNConc.FixedValue = 0.008
          [Root].MaximumRootDepth.FixedValue = 1000
          [Root].MinimumNConc.FixedValue = 0.008
          [Root].RootProportion.FixedValue = 0.1
          [Stover].CoverFunction.Expanding.SigCoverFunction.Xo.FixedValue = 540
          [Stover].CoverFunction.Expanding.SigCoverFunction.Ymax.FixedValue = 0.96
          [Stover].CoverFunction.Expanding.SigCoverFunction.b.FixedValue = 120
          [Stover].MaximumNConc.FixedValue = 0.02
          [Stover].MinimumNConc.FixedValue = 0.02
          [Stover].XoBiomass.FixedValue = 900.0
          [Stover].bBiomass.FixedValue = 180.0
      Cultivar Parsnips
        Command:
          [Nodule].FixationMetabolicCost.FixedValue = 0
          [Nodule].FixationRate.FixedValue = 0
          [Phenology].CanopyExpanding.Target.FixedValue = 489.0
          [Phenology].Senescing.Target.FixedValue = 750
          [Phenology].YieldIncreasing.Target.FixedValue = 1461.0
          [Product].DryMatterContent.FixedValue = 0.17
          [Product].ExpectedYield.FixedValue = 4400
          [Product].HarvestIndex.FixedValue = 0.95
          [Product].MaximumNConc.FixedValue = 0.014
          [Product].MinimumNConc.FixedValue = 0.0098
          [Root].KLModifier.XYPairs.Y = 1,1,1,1,1,1,1,0.472,0.223,0.105,0,0,0,0,0,0,0,0,0,0,0,0,0,0,0,0,0,0,0,0
          [Root].MaximumNConc.FixedValue = 0.01
          [Root].MaximumRootDepth.FixedValue = 500
          [Root].MinimumNConc.FixedValue = 0.01
          [Root].RootProportion.FixedValue = 0.1
          [Stover].CoverFunction.Expanding.SigCoverFunction.Xo.FixedValue = 690
          [Stover].CoverFunction.Expanding.SigCoverFunction.Ymax.FixedValue = 0.95
          [Stover].CoverFunction.Expanding.SigCoverFunction.b.FixedValue = 120
          [Stover].MaximumNConc.FixedValue = 0.02
          [Stover].MinimumNConc.FixedValue = 0.02
          [Stover].XoBiomass.FixedValue = 1350.0
          [Stover].bBiomass.FixedValue = 270.0
      Cultivar Phacelia
        Command:
          [Nodule].FixationMetabolicCost.FixedValue = 0
          [Nodule].FixationRate.FixedValue = 0
          [Phenology].CanopyExpanding.Target.FixedValue = 420.0
          [Phenology].Senescing.Target.FixedValue = 0
          [Phenology].YieldIncreasing.Target.FixedValue = 1230.0
          [Product].DryMatterContent.FixedValue = 1.0
          [Product].ExpectedYield.FixedValue = 500
          [Product].HarvestIndex.FixedValue = 0.9
          [Product].MaximumNConc.FixedValue = 0.03
          [Product].MinimumNConc.FixedValue = 0.021
          [Root].KLModifier.XYPairs.Y = 1,1,1,1,1,1,1,0.687,0.472,0.325,0.223,0.153,0.105,0.072,0,0,0,0,0,0,0,0,0,0,0,0,0,0,0,0
          [Root].MaximumNConc.FixedValue = 0.01
          [Root].MaximumRootDepth.FixedValue = 700
          [Root].MinimumNConc.FixedValue = 0.01
          [Root].RootProportion.FixedValue = 0.1
          [Stover].CoverFunction.Expanding.SigCoverFunction.Xo.FixedValue = 690
          [Stover].CoverFunction.Expanding.SigCoverFunction.Ymax.FixedValue = 0.96
          [Stover].CoverFunction.Expanding.SigCoverFunction.b.FixedValue = 60
          [Stover].MaximumNConc.FixedValue = 0.03
          [Stover].MinimumNConc.FixedValue = 0.03
          [Stover].XoBiomass.FixedValue = 825.0
          [Stover].bBiomass.FixedValue = 165.0
      Cultivar Plantain_Seed
        Command:
          [Nodule].FixationMetabolicCost.FixedValue = 0
          [Nodule].FixationRate.FixedValue = 0
          [Phenology].CanopyExpanding.Target.FixedValue = 1831.0
          [Phenology].Senescing.Target.FixedValue = 300
          [Phenology].YieldIncreasing.Target.FixedValue = 1169.0
          [Product].DryMatterContent.FixedValue = 0.85
          [Product].ExpectedYield.FixedValue = 200
          [Product].HarvestIndex.FixedValue = 0.2
          [Product].MaximumNConc.FixedValue = 0.03
          [Product].MinimumNConc.FixedValue = 0.0105
          [Root].KLModifier.XYPairs.Y = 1,1,1,1,1,1,1,0.472,0.223,0.105,0,0,0,0,0,0,0,0,0,0,0,0,0,0,0,0,0,0,0,0
          [Root].MaximumNConc.FixedValue = 0.01
          [Root].MaximumRootDepth.FixedValue = 500
          [Root].MinimumNConc.FixedValue = 0.01
          [Root].RootProportion.FixedValue = 0.1
          [Stover].CoverFunction.Expanding.SigCoverFunction.Xo.FixedValue = 690
          [Stover].CoverFunction.Expanding.SigCoverFunction.Ymax.FixedValue = 0.95
          [Stover].CoverFunction.Expanding.SigCoverFunction.b.FixedValue = 120
          [Stover].MaximumNConc.FixedValue = 0.02
          [Stover].MinimumNConc.FixedValue = 0.02
          [Stover].XoBiomass.FixedValue = 1650.0
          [Stover].bBiomass.FixedValue = 330.0
      Cultivar Potatoes_Long
        Command:
          [Nodule].FixationMetabolicCost.FixedValue = 0
          [Nodule].FixationRate.FixedValue = 0
          [Phenology].CanopyExpanding.Target.FixedValue = 690.0
          [Phenology].Senescing.Target.FixedValue = 600
          [Phenology].YieldIncreasing.Target.FixedValue = 1560.0
          [Product].DryMatterContent.FixedValue = 0.22
          [Product].ExpectedYield.FixedValue = 7100
          [Product].HarvestIndex.FixedValue = 0.911
          [Product].MaximumNConc.FixedValue = 0.018
          [Product].MinimumNConc.FixedValue = 0.0126
          [Root].KLModifier.XYPairs.Y = 1,1,1,1,1,1,1,0.807,0.651,0.526,0.424,0.343,0.276,0.223,0.18,0.145,0.117,0.095,0.076,0.062,0,0,0,0,0,0,0,0,0,0
          [Root].MaximumNConc.FixedValue = 0.01
          [Root].MaximumRootDepth.FixedValue = 1000
          [Root].MinimumNConc.FixedValue = 0.01
          [Root].RootProportion.FixedValue = 0.1
          [Stover].CoverFunction.Expanding.SigCoverFunction.Xo.FixedValue = 690
          [Stover].CoverFunction.Expanding.SigCoverFunction.Ymax.FixedValue = 0.96
          [Stover].CoverFunction.Expanding.SigCoverFunction.b.FixedValue = 60
          [Stover].MaximumNConc.FixedValue = 0.02
          [Stover].MinimumNConc.FixedValue = 0.02
          [Stover].XoBiomass.FixedValue = 1425.0
          [Stover].bBiomass.FixedValue = 285.0
      Cultivar Potatoes_Medium
        Command:
          [Nodule].FixationMetabolicCost.FixedValue = 0
          [Nodule].FixationRate.FixedValue = 0
          [Phenology].CanopyExpanding.Target.FixedValue = 638.0
          [Phenology].Senescing.Target.FixedValue = 600
          [Phenology].YieldIncreasing.Target.FixedValue = 1312.0
          [Product].DryMatterContent.FixedValue = 0.22
          [Product].ExpectedYield.FixedValue = 6400
          [Product].HarvestIndex.FixedValue = 0.904
          [Product].MaximumNConc.FixedValue = 0.018
          [Product].MinimumNConc.FixedValue = 0.0126
          [Root].KLModifier.XYPairs.Y = 1,1,1,1,1,1,1,0.807,0.651,0.526,0.424,0.343,0.276,0.223,0.18,0.145,0.117,0.095,0.076,0.062,0,0,0,0,0,0,0,0,0,0
          [Root].MaximumNConc.FixedValue = 0.01
          [Root].MaximumRootDepth.FixedValue = 1000
          [Root].MinimumNConc.FixedValue = 0.01
          [Root].RootProportion.FixedValue = 0.1
          [Stover].CoverFunction.Expanding.SigCoverFunction.Xo.FixedValue = 690
          [Stover].CoverFunction.Expanding.SigCoverFunction.Ymax.FixedValue = 0.96
          [Stover].CoverFunction.Expanding.SigCoverFunction.b.FixedValue = 60
          [Stover].MaximumNConc.FixedValue = 0.02
          [Stover].MinimumNConc.FixedValue = 0.02
          [Stover].XoBiomass.FixedValue = 1275.0
          [Stover].bBiomass.FixedValue = 255.0
      Cultivar Potatoes_Short
        Command:
          [Nodule].FixationMetabolicCost.FixedValue = 0
          [Nodule].FixationRate.FixedValue = 0
          [Phenology].CanopyExpanding.Target.FixedValue = 590.0
          [Phenology].Senescing.Target.FixedValue = 600
          [Phenology].YieldIncreasing.Target.FixedValue = 1060.0
          [Product].DryMatterContent.FixedValue = 0.23
          [Product].ExpectedYield.FixedValue = 5300
          [Product].HarvestIndex.FixedValue = 0.893
          [Product].MaximumNConc.FixedValue = 0.018
          [Product].MinimumNConc.FixedValue = 0.0126
          [Root].KLModifier.XYPairs.Y = 1,1,1,1,1,1,1,0.807,0.651,0.526,0.424,0.343,0.276,0.223,0.18,0.145,0.117,0.095,0.076,0.062,0,0,0,0,0,0,0,0,0,0
          [Root].MaximumNConc.FixedValue = 0.01
          [Root].MaximumRootDepth.FixedValue = 1000
          [Root].MinimumNConc.FixedValue = 0.01
          [Root].RootProportion.FixedValue = 0.1
          [Stover].CoverFunction.Expanding.SigCoverFunction.Xo.FixedValue = 690
          [Stover].CoverFunction.Expanding.SigCoverFunction.Ymax.FixedValue = 0.96
          [Stover].CoverFunction.Expanding.SigCoverFunction.b.FixedValue = 60
          [Stover].MaximumNConc.FixedValue = 0.02
          [Stover].MinimumNConc.FixedValue = 0.02
          [Stover].XoBiomass.FixedValue = 1125.0
          [Stover].bBiomass.FixedValue = 225.0
      Cultivar Radish_Seed
        Command:
          [Nodule].FixationMetabolicCost.FixedValue = 0
          [Nodule].FixationRate.FixedValue = 0
          [Phenology].CanopyExpanding.Target.FixedValue = 1064.0
          [Phenology].Senescing.Target.FixedValue = 300
          [Phenology].YieldIncreasing.Target.FixedValue = 436.0
          [Product].DryMatterContent.FixedValue = 0.84
          [Product].ExpectedYield.FixedValue = 170
          [Product].HarvestIndex.FixedValue = 0.1
          [Product].MaximumNConc.FixedValue = 0.03
          [Product].MinimumNConc.FixedValue = 0.02
          [Root].KLModifier.XYPairs.Y = 1,1,1,1,1,1,1,0.807,0.651,0.526,0.424,0.343,0.276,0.223,0.18,0.145,0.117,0.095,0.076,0.062,0,0,0,0,0,0,0,0,0,0
          [Root].MaximumNConc.FixedValue = 0.008
          [Root].MaximumRootDepth.FixedValue = 1000
          [Root].MinimumNConc.FixedValue = 0.008
          [Root].RootProportion.FixedValue = 0.1
          [Stover].CoverFunction.Expanding.SigCoverFunction.Xo.FixedValue = 540
          [Stover].CoverFunction.Expanding.SigCoverFunction.Ymax.FixedValue = 0.96
          [Stover].CoverFunction.Expanding.SigCoverFunction.b.FixedValue = 120
          [Stover].MaximumNConc.FixedValue = 0.02
          [Stover].MinimumNConc.FixedValue = 0.02
          [Stover].XoBiomass.FixedValue = 900.0
          [Stover].bBiomass.FixedValue = 180.0
      Cultivar Rape
        Command:
          [Nodule].FixationMetabolicCost.FixedValue = 0
          [Nodule].FixationRate.FixedValue = 0
          [Phenology].CanopyExpanding.Target.FixedValue = 999.0
          [Phenology].Senescing.Target.FixedValue = 0
          [Phenology].YieldIncreasing.Target.FixedValue = 2001.0
          [Product].DryMatterContent.FixedValue = 0.13
          [Product].ExpectedYield.FixedValue = 4615
          [Product].HarvestIndex.FixedValue = 0.8
          [Product].MaximumNConc.FixedValue = 0.03
          [Product].MinimumNConc.FixedValue = 0.02
          [Root].KLModifier.XYPairs.Y = 1,1,1,1,1,1,1,0.931,0.867,0.807,0.751,0.7,0.651,0.607,0.565,0.526,0.49,0.456,0.424,0.395,0.368,0.343,0.319,0.297,0.276,0.257,0.24,0.223,0.208,0.193
          [Root].MaximumNConc.FixedValue = 0.008
          [Root].MaximumRootDepth.FixedValue = 2400
          [Root].MinimumNConc.FixedValue = 0.008
          [Root].RootProportion.FixedValue = 0.1
          [Stover].CoverFunction.Expanding.SigCoverFunction.Xo.FixedValue = 770
          [Stover].CoverFunction.Expanding.SigCoverFunction.Ymax.FixedValue = 0.96
          [Stover].CoverFunction.Expanding.SigCoverFunction.b.FixedValue = 57
          [Stover].MaximumNConc.FixedValue = 0.01
          [Stover].MinimumNConc.FixedValue = 0.01
          [Stover].XoBiomass.FixedValue = 1500.0
          [Stover].bBiomass.FixedValue = 300.0
      Cultivar Rape_Seed: same as Replacements.SCRUM.Radish_Seed
      Cultivar RyeCorn_Autumn: same as Replacements.SCRUM.Oats_AutumnForage
      Cultivar RyeCorn_Spring: same as Replacements.SCRUM.Barley_SpringForage
      Cultivar Ryegrass_1styear
        Command:
          [Nodule].FixationMetabolicCost.FixedValue = 0
          [Nodule].FixationRate.FixedValue = 0
          [Phenology].CanopyExpanding.Target.FixedValue = 1590.0
          [Phenology].Senescing.Target.FixedValue = 450
          [Phenology].YieldIncreasing.Target.FixedValue = 660.0
          [Product].DryMatterContent.FixedValue = 0.85
          [Product].ExpectedYield.FixedValue = 150
          [Product].HarvestIndex.FixedValue = 0.105
          [Product].MaximumNConc.FixedValue = 0.015
          [Product].MinimumNConc.FixedValue = 0.0105
          [Root].KLModifier.XYPairs.Y = 1,1,1,1,1,1,1,0.687,0.472,0.325,0.223,0.153,0.105,0.072,0,0,0,0,0,0,0,0,0,0,0,0,0,0,0,0
          [Root].MaximumNConc.FixedValue = 0.01
          [Root].MaximumRootDepth.FixedValue = 700
          [Root].MinimumNConc.FixedValue = 0.01
          [Root].RootProportion.FixedValue = 0.1
          [Stover].CoverFunction.Expanding.SigCoverFunction.Xo.FixedValue = 540
          [Stover].CoverFunction.Expanding.SigCoverFunction.Ymax.FixedValue = 0.96
          [Stover].CoverFunction.Expanding.SigCoverFunction.b.FixedValue = 120
          [Stover].MaximumNConc.FixedValue = 0.015
          [Stover].MinimumNConc.FixedValue = 0.015
          [Stover].XoBiomass.FixedValue = 1350.0
          [Stover].bBiomass.FixedValue = 270.0
      Cultivar Ryegrass_2ndyear
        Command:
          [Nodule].FixationMetabolicCost.FixedValue = 0
          [Nodule].FixationRate.FixedValue = 0
          [Phenology].CanopyExpanding.Target.FixedValue = 1237.0
          [Phenology].Senescing.Target.FixedValue = 300
          [Phenology].YieldIncreasing.Target.FixedValue = 563.0
          [Product].DryMatterContent.FixedValue = 0.85
          [Product].ExpectedYield.FixedValue = 150
          [Product].HarvestIndex.FixedValue = 0.105
          [Product].MaximumNConc.FixedValue = 0.015
          [Product].MinimumNConc.FixedValue = 0.0105
          [Root].KLModifier.XYPairs.Y = 1,1,1,1,1,1,1,0.687,0.472,0.325,0.223,0.153,0.105,0.072,0,0,0,0,0,0,0,0,0,0,0,0,0,0,0,0
          [Root].MaximumNConc.FixedValue = 0.01
          [Root].MaximumRootDepth.FixedValue = 700
          [Root].MinimumNConc.FixedValue = 0.01
          [Root].RootProportion.FixedValue = 0.1
          [Stover].CoverFunction.Expanding.SigCoverFunction.Xo.FixedValue = 300
          [Stover].CoverFunction.Expanding.SigCoverFunction.Ymax.FixedValue = 0.96
          [Stover].CoverFunction.Expanding.SigCoverFunction.b.FixedValue = 120
          [Stover].MaximumNConc.FixedValue = 0.015
          [Stover].MinimumNConc.FixedValue = 0.015
          [Stover].XoBiomass.FixedValue = 1050.0
          [Stover].bBiomass.FixedValue = 210.0
      Cultivar Spinach
        Command:
          [Nodule].FixationMetabolicCost.FixedValue = 0
          [Nodule].FixationRate.FixedValue = 0
          [Phenology].CanopyExpanding.Target.FixedValue = 1150.0
          [Phenology].Senescing.Target.FixedValue = 900
          [Phenology].YieldIncreasing.Target.FixedValue = 950.0
          [Product].DryMatterContent.FixedValue = 0.05
          [Product].ExpectedYield.FixedValue = 2200
          [Product].HarvestIndex.FixedValue = 0.7
          [Product].MaximumNConc.FixedValue = 0.03
          [Product].MinimumNConc.FixedValue = 0.021
          [Root].KLModifier.XYPairs.Y = 1,1,1,1,1,1,1,0.472,0.223,0.105,0,0,0,0,0,0,0,0,0,0,0,0,0,0,0,0,0,0,0,0
          [Root].MaximumNConc.FixedValue = 0.009
          [Root].MaximumRootDepth.FixedValue = 500
          [Root].MinimumNConc.FixedValue = 0.009
          [Root].RootProportion.FixedValue = 0.1
          [Stover].CoverFunction.Expanding.SigCoverFunction.Xo.FixedValue = 360
          [Stover].CoverFunction.Expanding.SigCoverFunction.Ymax.FixedValue = 0.8
          [Stover].CoverFunction.Expanding.SigCoverFunction.b.FixedValue = 120
          [Stover].MaximumNConc.FixedValue = 0.015
          [Stover].MinimumNConc.FixedValue = 0.015
          [Stover].XoBiomass.FixedValue = 1500.0
          [Stover].bBiomass.FixedValue = 300.0
      Cultivar Spinach_Seed
        Command:
          [Nodule].FixationMetabolicCost.FixedValue = 0
          [Nodule].FixationRate.FixedValue = 0
          [Phenology].CanopyExpanding.Target.FixedValue = 939.0
          [Phenology].Senescing.Target.FixedValue = 300
          [Phenology].YieldIncreasing.Target.FixedValue = 561.0
          [Product].DryMatterContent.FixedValue = 0.84
          [Product].ExpectedYield.FixedValue = 300
          [Product].HarvestIndex.FixedValue = 0.3
          [Product].MaximumNConc.FixedValue = 0.03
          [Product].MinimumNConc.FixedValue = 0.02
          [Root].KLModifier.XYPairs.Y = 1,1,1,1,1,1,1,0.807,0.651,0.526,0.424,0.343,0.276,0.223,0.18,0.145,0.117,0.095,0.076,0.062,0,0,0,0,0,0,0,0,0,0
          [Root].MaximumNConc.FixedValue = 0.008
          [Root].MaximumRootDepth.FixedValue = 1000
          [Root].MinimumNConc.FixedValue = 0.008
          [Root].RootProportion.FixedValue = 0.1
          [Stover].CoverFunction.Expanding.SigCoverFunction.Xo.FixedValue = 540
          [Stover].CoverFunction.Expanding.SigCoverFunction.Ymax.FixedValue = 0.96
          [Stover].CoverFunction.Expanding.SigCoverFunction.b.FixedValue = 120
          [Stover].MaximumNConc.FixedValue = 0.02
          [Stover].MinimumNConc.FixedValue = 0.02
          [Stover].XoBiomass.FixedValue = 900.0
          [Stover].bBiomass.FixedValue = 180.0
      Cultivar SpringOnion_seed: same as Replacements.SCRUM.Radish_Seed
      Cultivar Squash
        Command:
          [Nodule].FixationMetabolicCost.FixedValue = 0
          [Nodule].FixationRate.FixedValue = 0
          [Phenology].CanopyExpanding.Target.FixedValue = 899.0
          [Phenology].Senescing.Target.FixedValue = 300
          [Phenology].YieldIncreasing.Target.FixedValue = 1501.0
          [Product].DryMatterContent.FixedValue = 0.2
          [Product].ExpectedYield.FixedValue = 2500
          [Product].HarvestIndex.FixedValue = 0.8
          [Product].MaximumNConc.FixedValue = 0.02
          [Product].MinimumNConc.FixedValue = 0.014
          [Root].KLModifier.XYPairs.Y = 1,1,1,1,1,1,1,0.472,0.223,0.105,0,0,0,0,0,0,0,0,0,0,0,0,0,0,0,0,0,0,0,0
          [Root].MaximumNConc.FixedValue = 0.01
          [Root].MaximumRootDepth.FixedValue = 500
          [Root].MinimumNConc.FixedValue = 0.01
          [Root].RootProportion.FixedValue = 0.1
          [Stover].CoverFunction.Expanding.SigCoverFunction.Xo.FixedValue = 600
          [Stover].CoverFunction.Expanding.SigCoverFunction.Ymax.FixedValue = 0.94
          [Stover].CoverFunction.Expanding.SigCoverFunction.b.FixedValue = 90
          [Stover].MaximumNConc.FixedValue = 0.02
          [Stover].MinimumNConc.FixedValue = 0.02
          [Stover].XoBiomass.FixedValue = 1350.0
          [Stover].bBiomass.FixedValue = 270.0
      Cultivar Sweetcorn
        Command:
          [Nodule].FixationMetabolicCost.FixedValue = 0
          [Nodule].FixationRate.FixedValue = 0
          [Phenology].CanopyExpanding.Target.FixedValue = 794.0
          [Phenology].Senescing.Target.FixedValue = 300
          [Phenology].YieldIncreasing.Target.FixedValue = 706.0
          [Product].DryMatterContent.FixedValue = 0.5
          [Product].ExpectedYield.FixedValue = 2500
          [Product].HarvestIndex.FixedValue = 0.55
          [Product].MaximumNConc.FixedValue = 0.014
          [Product].MinimumNConc.FixedValue = 0.0098
          [Root].KLModifier.XYPairs.Y = 1,1,1,1,1,1,1,0.807,0.651,0.526,0.424,0.343,0.276,0.223,0.18,0.145,0.117,0.095,0.076,0.062,0,0,0,0,0,0,0,0,0,0
          [Root].MaximumNConc.FixedValue = 0.007
          [Root].MaximumRootDepth.FixedValue = 1000
          [Root].MinimumNConc.FixedValue = 0.007
          [Root].RootProportion.FixedValue = 0.1
          [Stover].CoverFunction.Expanding.SigCoverFunction.Xo.FixedValue = 540
          [Stover].CoverFunction.Expanding.SigCoverFunction.Ymax.FixedValue = 0.75
          [Stover].CoverFunction.Expanding.SigCoverFunction.b.FixedValue = 120
          [Stover].MaximumNConc.FixedValue = 0.009
          [Stover].MinimumNConc.FixedValue = 0.009
          [Stover].XoBiomass.FixedValue = 900.0
          [Stover].bBiomass.FixedValue = 180.0
      Cultivar Tall_Fescue: same as Replacements.SCRUM.Ryegrass_1styear
      Cultivar Tomato
        Command:
          [Nodule].FixationMetabolicCost.FixedValue = 0
          [Nodule].FixationRate.FixedValue = 0
          [Phenology].CanopyExpanding.Target.FixedValue = 1236.0
          [Phenology].Senescing.Target.FixedValue = 750
          [Phenology].YieldIncreasing.Target.FixedValue = 714.0
          [Product].DryMatterContent.FixedValue = 0.05
          [Product].ExpectedYield.FixedValue = 10000
          [Product].HarvestIndex.FixedValue = 0.5
          [Product].MaximumNConc.FixedValue = 0.02
          [Product].MinimumNConc.FixedValue = 0.014
          [Root].KLModifier.XYPairs.Y = 1,1,1,1,1,1,1,0.472,0.223,0.105,0,0,0,0,0,0,0,0,0,0,0,0,0,0,0,0,0,0,0,0
          [Root].MaximumNConc.FixedValue = 0.01
          [Root].MaximumRootDepth.FixedValue = 500
          [Root].MinimumNConc.FixedValue = 0.01
          [Root].RootProportion.FixedValue = 0.1
          [Stover].CoverFunction.Expanding.SigCoverFunction.Xo.FixedValue = 690
          [Stover].CoverFunction.Expanding.SigCoverFunction.Ymax.FixedValue = 0.96
          [Stover].CoverFunction.Expanding.SigCoverFunction.b.FixedValue = 120
          [Stover].MaximumNConc.FixedValue = 0.02
          [Stover].MinimumNConc.FixedValue = 0.02
          [Stover].XoBiomass.FixedValue = 1350.0
          [Stover].bBiomass.FixedValue = 270.0
      Cultivar Triticalie_Autumn: same as Replacements.SCRUM.Oats_AutumnForage
      Cultivar Triticalie_Spring: same as Replacements.SCRUM.Barley_SpringForage
      Cultivar Wheat_Autumn: same as Replacements.SCRUM.Barley_Autumn
      Cultivar Wheat_Spring
        Command:
          [Nodule].FixationMetabolicCost.FixedValue = 0
          [Nodule].FixationRate.FixedValue = 0
          [Phenology].CanopyExpanding.Target.FixedValue = 848.0
          [Phenology].Senescing.Target.FixedValue = 300
          [Phenology].YieldIncreasing.Target.FixedValue = 652.0
          [Product].DryMatterContent.FixedValue = 0.87
          [Product].ExpectedYield.FixedValue = 800
          [Product].HarvestIndex.FixedValue = 0.46
          [Product].MaximumNConc.FixedValue = 0.013
          [Product].MinimumNConc.FixedValue = 0.0091
          [Root].KLModifier.XYPairs.Y = 1,1,1,1,1,1,1,0.807,0.651,0.526,0.424,0.343,0.276,0.223,0.18,0.145,0.117,0.095,0.076,0.062,0,0,0,0,0,0,0,0,0,0
          [Root].MaximumNConc.FixedValue = 0.009
          [Root].MaximumRootDepth.FixedValue = 1000
          [Root].MinimumNConc.FixedValue = 0.009
          [Root].RootProportion.FixedValue = 0.1
          [Stover].CoverFunction.Expanding.SigCoverFunction.Xo.FixedValue = 540
          [Stover].CoverFunction.Expanding.SigCoverFunction.Ymax.FixedValue = 0.96
          [Stover].CoverFunction.Expanding.SigCoverFunction.b.FixedValue = 120
          [Stover].MaximumNConc.FixedValue = 0.005
          [Stover].MinimumNConc.FixedValue = 0.005
          [Stover].XoBiomass.FixedValue = 900.0
          [Stover].bBiomass.FixedValue = 180.0
  DataStore
    ExcelInput Observed: FileName=LucerneObserved.xlsx; SheetNames=[ObservedBiomass, ObservedNodes]
  Experiment Iverson9
    Factors
      Factor Water
        Factor Dry: Specifications=[IrrigationEvents]
          Operations IrrigationEvents
        Factor Irr: Specifications=[IrrigationEvents]
          Operations IrrigationEvents
            1998-01-07  [Irrigation].Apply(25);
            1998-01-14  [Irrigation].Apply(25);
            1998-01-21  [Irrigation].Apply(25);
            1998-01-28  [Irrigation].Apply(25);
            1998-02-07  [Irrigation].Apply(25);
            1998-02-14  [Irrigation].Apply(25);
            1998-02-21  [Irrigation].Apply(25);
            1998-02-28  [Irrigation].Apply(25);
            1998-03-07  [Irrigation].Apply(25);
            1998-03-14  [Irrigation].Apply(25);
            1998-03-21  [Irrigation].Apply(25);
            1998-03-28  [Irrigation].Apply(25);
    Simulation BaseSimulation
      Clock: StartDate=2000-10-24; EndDate=2007-07-01
      Summary summaryfile
      Weather: FileName=%root%\Examples\WeatherFiles\lincoln.met
      SoilArbitrator Soil Arbitrator
      Zone paddock: Area=1; Slope=0
        Soil: Latitude=0; Longitude=0
          Analysis: Thickness=[100, 200, 300, 300, 300, 300]; PH=[6.6, 6.2, 5.7, 5.5, 5.5, 5.5]; PHUnits=Water; BoronUnits=HotWater
          InitialWater Initial water: PercentMethod=EvenlyDistributed; FractionFull=1
          Water
            Thickness  BD   AirDry  LL15  DUL   SAT
            100        1.2  0.08    0.13  0.33  0.5
            200        1.2  0.13    0.13  0.33  0.5
            300        1.2  0.1     0.1   0.31  0.44
            300        1.2  0.06    0.06  0.15  0.46
            300        1.2  0.04    0.04  0.1   0.44
            300        1.2  0.02    0.02  0.06  0.44
            SoilCrop LucerneSoil: LL=[0.13, 0.13, 0.1, 0.08, 0.11, 0.11]; KL=[0.06, 0.06, 0.06, 0.06, 0.06, 0.06]; XF=[1, 1, 1, 1, 1, 1]
            SoilCrop LucerneSoil: LL=[0.13, 0.13, 0.27, 0.27, 0.3, 0.3]; KL=[0.1, 0.06, 0.03, 0.01, 0, 0]; XF=[1, 1, 0.1, 0, 0, 0]
          SoilWater: SummerDate=1-Nov; SummerU=9; SummerCona=4.4; WinterDate=1-Apr; WinterU=9; WinterCona=4.4; DiffusConst=88; DiffusSlope=35.4; Salb=0.18; CN2Bare=68; CNRed=20; CNCov=0.8; max_pond=0; Thickness=[100, 200, 300, 300, 300, 300]; SWCON=[0.55, 0.55, 0.55, 0.55, 0.55, 0.55]; residueinterception=0
          SoilNitrogen: fom_type=[default, manure, mucuna, lablab, shemp, stable]; fract_carb=[0.2, 0.3, 0.54, 0.57, 0.45, 0]; fract_cell=[0.7, 0.3, 0.37, 0.37, 0.47, 0.1]; fract_lign=[0.1, 0.4, 0.09, 0.06, 0.08, 0.9]; wfpsN2N2O_x=[22, 88]; wfpsN2N2O_y=[0.1, 1]
          SoilOrganicMatter: RootCN=30; RootWt=3000; SoilCN=11.5; EnrACoeff=7.4; EnrBCoeff=0.2; OCUnits=Total
            Thickness  OC    FBiom  FInert
            100        1.82  0.025  0.3
            200        1.47  0.025  0.4
            300        1.2   0.015  0.75
            300        1.03  0.01   0.9
            300        0.47  0.01   0.96
            300        0.47  0.01   0.96
          Sample: NO3Units=kgha; NH4Units=ppm; SWUnits=Volumetric; OCUnits=Total; PHUnits=Water
            Thickness  NO3  NH4
            100        217  0
            200        30   0
            300        5    0
            300        5    0
            300        0    0
            300        0    0
          CERESSoilTemperature
        MicroClimate: a_interception=0; b_interception=1; c_interception=0; d_interception=0; soil_albedo=0.23; sun_angle=15; soil_heat_flux_fraction=0.4; night_interception_fraction=0.5; refheight=2; albedo=0.26; emissivity=0.96; RadIntTotal=0
        Irrigation
        Fertiliser
        Manager DiagnosticsVariables
```csharp
using System;
using Models.Core;
using System.Collections.Generic;
using System.Text;
using Models.Soils;
using Models.PMF;
using Models;
using System.Xml.Serialization;
using APSIM.Shared.Utilities;
namespace Models
{
	[Serializable] 
	public class Script : Model
	{
		[Link] Clock Clock;
		[Link] Soils.Soil Soil;
		[Link] Models.SurfaceOM.SurfaceOrganicMatter SOM;
		[Link] Weather Met;
		[Link] Fertiliser Fert;
		[Link] Irrigation Irrig;
		[Link] Plant Lucerne;
		[Link] Zone zone;
					
		[XmlIgnore] public bool InitialDay { get; set; }
		
		[XmlIgnore] public double AccumPlantN { get; set; }
		[XmlIgnore] public double AccumMineralisation { get; set; }
		[XmlIgnore] public double AccumDenit { get; set; }
		[XmlIgnore] public double AccumFert { get; set; }
		[XmlIgnore] public double AccumLeach { get; set; }
		[XmlIgnore] public double AccumDetach { get; set; }
		[XmlIgnore] public double DeltaSoilOMN { get; set; }
		[XmlIgnore] public double DeltaSurfaceOMN { get; set; }
		[XmlIgnore] public double DeltaSoilMineralN { get; set; }
		[XmlIgnore] public double SoilNitrogenContent { get; set; }
		
		[XmlIgnore] public double AccumEO { get; set; }
		[XmlIgnore] public double AccumEP { get; set; }
		[XmlIgnore] public double AccumES { get; set; }
		[XmlIgnore] public double AccumDrainage { get; set; }
		[XmlIgnore] public double AccumRunoff { get; set; }
		[XmlIgnore] public double AccumOutflowLat { get; set; }
		[XmlIgnore] public double AccumIrrigation { get; set; }
		[XmlIgnore] public double AccumRainfall { get; set; }
		[XmlIgnore] public double SoilWaterDeficit { get; set; }
	
		[XmlIgnore] public double  InitialSoilOMN { get; set; }
		[XmlIgnore] public double  InitialSurfaceOMN { get; set; }
		[XmlIgnore] public double  InitialMineralN { get; set; }
		
		[XmlIgnore] public double SWC { get; set; }
		[XmlIgnore] public double DUL { get; set; }
		[XmlIgnore] public double OutFlowLat { get; set; }

		[XmlIgnore] public double FomN { get; set; }
		[XmlIgnore] public double BiomN { get; set; }
		[XmlIgnore] public double HumN { get; set; }
		[XmlIgnore] public double OrganicN { get; set; }
		[XmlIgnore] public double NO3N { get; set; }
		[XmlIgnore] public double NH4N { get; set; }
		[XmlIgnore] public double UreaN { get; set; }
		[XmlIgnore] public double MineralN { get; set; }
		[XmlIgnore] public double DltNMinRes { get; set; }
		[XmlIgnore] public double DltNMinTot { get; set; }
		
		[EventSubscribe("Commencing")]
		private void OnSimulationCommencing(object sender, EventArgs e)
		{
			InitialDay = true;
		}
		
		[EventSubscribe("DoManagement")]
		private void OnDoManagement(object sender, EventArgs e)
		{
			//!!!!!! Nitrogen balance components !!!!!!
			//!!!!!!^^^^^^^^^^^^^^^^^^^^^^^^^^^^^!!!!!!
			FomN = MathUtilities.Sum(Soil.SoilNitrogen.FOMN);
			HumN = MathUtilities.Sum(Soil.SoilNitrogen.HumicN);
			BiomN = MathUtilities.Sum(Soil.SoilNitrogen.MicrobialN);
			OrganicN = FomN + HumN + BiomN;
			NO3N = MathUtilities.Sum(Soil.NO3N);
			NH4N = MathUtilities.Sum(Soil.NH4N);
			UreaN = MathUtilities.Sum(Soil.SoilNitrogen.urea);
			MineralN = NO3N + NH4N + UreaN; 
			DltNMinRes = MathUtilities.Sum(Soil.SoilNitrogen.dlt_n_min_res);
			DltNMinTot = MathUtilities.Sum(Soil.SoilNitrogen.MineralisedN);
			int layers = Soil.Thickness.Length;
			if (InitialDay == true)
			{
				InitialSurfaceOMN = SOM.N;
				InitialSoilOMN = OrganicN;
				InitialMineralN = MineralN;
				InitialDay = false;
			}
			AccumFert += Fert.NitrogenApplied;
			DeltaSurfaceOMN = SOM.N - InitialSurfaceOMN;
			AccumLeach = AccumLeach - Soil.SoilWater.LeachNH4 - Soil.SoilWater.LeachNO3 - Soil.SoilWater.LeachUrea; //Fails
			AccumMineralisation += MathUtilities.Sum(Soil.SoilNitrogen.MineralisedN);
			AccumDenit -= MathUtilities.Sum(Soil.SoilNitrogen.Denitrification);
			AccumPlantN -= (double)zone.Get("Lucerne.Root.NUptake");
			DeltaSoilOMN = OrganicN - InitialSoilOMN;
			DeltaSoilMineralN = MineralN - InitialMineralN;
			SoilNitrogenContent = MineralN;
			
			//!!!!!! Water balance components !!!!!!
			//!!!!!!^^^^^^^^^^^^^^^^^^^^^^^^^^!!!!!!

			AccumIrrigation += Irrig.IrrigationApplied;
			AccumRainfall += Met.Rain;
			//AccumEP -= (double)zone.Get("[Lucerne].Leaf.Transpiration");
			AccumEP -= (double)zone.Get("Lucerne.Root.WaterUptake");
			SoilWaterDeficit = (SWC - DUL);
			double OutFlowLat = MathUtilities.Sum(Soil.SoilWater.outflow_lat);
			AccumOutflowLat -= OutFlowLat;
		}
		
		[EventSubscribe("DoManagementCalculations")]
		private void OnDoManagementCalculations(object sender, EventArgs e)
		{
			FomN = MathUtilities.Sum(Soil.SoilNitrogen.FOMN);
			HumN = MathUtilities.Sum(Soil.SoilNitrogen.HumicN);
			BiomN = MathUtilities.Sum(Soil.SoilNitrogen.MicrobialN);
			
			
			AccumEO -= Soil.SoilWater.Eo;
			AccumES -= Soil.SoilWater.Es; 
			AccumDrainage -= Soil.SoilWater.Drainage;
			AccumRunoff -= Soil.SoilWater.Runoff;
			SWC = MathUtilities.Sum(Soil.SoilWater.SWmm);
			DUL = MathUtilities.Sum(Soil.SoilWater.DULmm);
		}
	}
}
```
        SurfaceOrganicMatter surface organic matter: PoolName=wheat; type=wheat; mass=0; standing_fraction=0; cnr=80; CriticalResidueWeight=2000; OptimumDecompTemp=20; MaxCumulativeEOS=20; CNRatioDecompCoeff=0.277; CNRatioDecompThreshold=25; TotalLeachRain=25; MinRainToLeach=10; CriticalMinimumOrganicC=0.004; DefaultCPRatio=0; DefaultStandingFraction=0; StandingExtinctCoeff=0.5; FractionFaecesAdded=0.5
          Pools:
            {PoolName=wheat, ResidueType=wheat, Mass=0, CNRatio=80, StandingFraction=0}
          ResidueTypes ResidueTypesList: LoadFromResource=ResidueTypes
        Report: EventNames=[Clock].DoReport
          VariableNames:
            [Clock].Today
            [DiagnosticsVariables].Script.AccumPlantN
            [DiagnosticsVariables].Script.AccumMineralisation
            [DiagnosticsVariables].Script.AccumDenit
            [DiagnosticsVariables].Script.AccumFert
            [DiagnosticsVariables].Script.AccumLeach
            [DiagnosticsVariables].Script.AccumDetach
            [DiagnosticsVariables].Script.DeltaSoilOMN
            [DiagnosticsVariables].Script.DeltaSurfaceOMN
            [DiagnosticsVariables].Script.DeltaSoilMineralN
            [Lucerne].Root.NSupply
            [Soil].SoilWater.Eo
            [Soil].SoilWater.Es
            [DiagnosticsVariables].Script.SWC
            [DiagnosticsVariables].Script.DUL
            [Soil].SoilWater.Drainage
            [Soil].SoilWater.Runoff
            [DiagnosticsVariables].Script.OutFlowLat
            [Soil].SoilWater.pond
            [DiagnosticsVariables].Script.AccumEO
            [DiagnosticsVariables].Script.AccumEP
            [DiagnosticsVariables].Script.AccumES
            [DiagnosticsVariables].Script.AccumDrainage
            [DiagnosticsVariables].Script.AccumRunoff
            [DiagnosticsVariables].Script.AccumRainfall
            [DiagnosticsVariables].Script.AccumIrrigation
            [DiagnosticsVariables].Script.AccumOutflowLat
            [DiagnosticsVariables].Script.SoilWaterDeficit
            [Lucerne].Grain.Live.Wt
            [Lucerne].Shell.Live.Wt
            [Lucerne].Stem.Live.Wt
            [Lucerne].Stem.Live.Wt
            [Lucerne].Grain.Live.N
            [Lucerne].Shell.Live.N
            [Lucerne].Leaf.Live.Wt
            [Lucerne].Root.Live.Wt
            [Lucerne].Leaf.Live.N
            [Lucerne].Root.Live.N
            [Lucerne].Leaf.Live.NConc
            [Lucerne].Root.Live.NConc
            [Lucerne].Root.WaterSupply
            [Lucerne].Root.WaterUptake
            [Lucerne].Leaf.Transpiration
            [Lucerne].Leaf.WaterDemand
            [Lucerne].Root.Depth
            [Lucerne].Leaf.CoverTotal
            [Lucerne].Leaf.CoverDead
            [Lucerne].Leaf.LAI
            [Lucerne].Leaf.Height
            [Lucerne].Leaf.PotentialBiomass.Value()
            [Soil].SoilWater.SWmm
            [Soil].NO3N
            [DiagnosticsVariables].Script.SoilNitrogenContent
            [Lucerne].Arbitrator.N.TotalPlantDemand
            [MicroClimate].net_radn
            [MicroClimate].peta
            [MicroClimate].petr
            [DiagnosticsVariables].Script.FomN
            [DiagnosticsVariables].Script.HumN
            [DiagnosticsVariables].Script.BiomN
            [DiagnosticsVariables].Script.DltNMinRes
            [DiagnosticsVariables].Script.DltNMinTot
            [Lucerne].Leaf.Fw
            [Lucerne].Leaf.Fn
            [Lucerne].Phenology.CurrentPhaseName
            [Lucerne].Phenology.CurrentStageName
            [Lucerne].Phenology.Stage
            [Lucerne].Pod.Wt
            [Lucerne].Pod.N
            [Lucerne].Structure.LeafTipsAppeared
            [Lucerne].Structure.MainStemPrimordiaNo
            [Lucerne].Leaf.CohortArea[1]
            [Lucerne].Leaf.CohortArea[2]
            [Lucerne].Leaf.CohortArea[3]
            [Lucerne].Leaf.CohortArea[4]
            [Lucerne].Leaf.CohortArea[5]
            [Lucerne].Leaf.CohortArea[6]
            [Lucerne].Leaf.CohortArea[7]
            [Lucerne].Leaf.CohortArea[8]
            [Lucerne].Leaf.CohortArea[9]
            [Lucerne].Leaf.CohortArea[10]
            [Lucerne].Leaf.CohortArea[11]
            [Lucerne].Leaf.CohortArea[12]
            [Lucerne].Leaf.CohortArea[13]
            [Lucerne].Leaf.CohortArea[14]
            [Lucerne].Leaf.CohortArea[15]
            [Lucerne].Leaf.AppearedCohortNo
            [Lucerne].Leaf.DeadCohortNo
            [Lucerne].AboveGround.Wt
            [Lucerne].Phenology.Stage
            [Lucerne].Structure.MainStemPrimordiaNo
            [Lucerne].Phenology.NFF.Value()
            [LucerneHarvestRule].Script.FinalTag
            [Lucerne].Grain.NumberFunction.Value()
            [Lucerne].Shell.PodNumber.Value()
            [Lucerne].Phenology.FN.Value()
            [Lucerne].Phenology.FN.TotalNodes.Value()
            [Lucerne].Phenology.FN.VegetativeNodes.Value()
        Manager LucerneSowingRule
          RowSpacing = 150
          SowingDepth = 20
          SowingRate = 100
          CultivarName = Kaituna
          SowingDate = 2000-10-24
```csharp
using System;
using Models.Core;
using Models.PMF;
using APSIM.Shared.Utilities;
        
namespace Models
{
	[Serializable] 
	[System.Xml.Serialization.XmlInclude(typeof(Model))]
	public class Script : Model
	{
		[Link] Plant Lucerne;
		[Link] Clock Clock;

		[Description("Spacing (mm) between rows")]
		public double RowSpacing { get; set; }
		[Description("Depth (mm) Grains are planted")]
		public double SowingDepth { get; set; }
		[Description("Seeds sown (/m2)")]
		public double SowingRate { get; set; }
		[Description("Cultivar")]
		[Display(DisplayType = DisplayAttribute.DisplayTypeEnum.CultivarName)]
		public string CultivarName { get; set; }
		[Description("Sowing Date")]
		public DateTime SowingDate { get; set; }

		[EventSubscribe("DoManagement")]
		private void OnDoManagement(object sender, EventArgs e)
		{
			if (Clock.Today.Date == SowingDate)
				Lucerne.Sow(population: SowingRate, cultivar: CultivarName, depth: SowingDepth, rowSpacing: RowSpacing, budNumber: 1);
			//Lucerne.Sow(... Contains the following arguements:
			//Population  double  Required  Seeds sowing/m2
			//Cultivar    string  Required  "NameOfCultivar"
			//Depth       double  Optional  Depth (mm) seed sown.   Default is 100mm 
			//MaxCover    double  Optional  Proportion (0-1) of the ground row crop will cover.   Default is 1.0
			//BudNumber   double  Optional  Number of mainstems per seed sown.  Default is 1.0
			//RowSpacing  double  Optional  Spaceing (mm) between drill rows when crop is sown.  Default is 150mm
			//CropClass   string  Optional  Crop class to instantiate when crop is sown.  Default is "Plant"
		}
	}
}
```
        Operations IrrigationEvents
          1998-01-07  [Irrigation].Apply(25);
          1998-01-14  [Irrigation].Apply(25);
          1998-01-21  [Irrigation].Apply(25);
          1998-01-28  [Irrigation].Apply(25);
          1998-02-07  [Irrigation].Apply(25);
          1998-02-14  [Irrigation].Apply(25);
          1998-02-21  [Irrigation].Apply(25);
          1998-02-28  [Irrigation].Apply(25);
          1998-03-07  [Irrigation].Apply(25);
          1998-03-14  [Irrigation].Apply(25);
          1998-03-21  [Irrigation].Apply(25);
          1998-03-28  [Irrigation].Apply(25);
          1998-07-01  [Mower].Script.Cut(0.8,1.0,0.1);
        Plant Lucerne: CropType=Lucerne
        SoluteManager
        Manager Mower
```csharp
using System;
using System.Collections.Generic;
using Models.Core;
using Models.PMF;
using Models.PMF.Interfaces;
using System.Xml.Serialization;

namespace Models
{
	[Serializable] 
	[System.Xml.Serialization.XmlInclude(typeof(Model))]
	public class Script : Model
	{
		[Link] Plant Lucerne;
		
		[XmlIgnore] private RemovalFractions Remove { get; set; }
		
		[EventSubscribe("Commencing")]
		private void OnSimulationCommencing(object sender, EventArgs e)
		{
			Remove = new RemovalFractions();
		}
		
		public void Cut(double StemFrac, double LeafFrac, double RootFrac)
		{
			Remove.SetPhenologyStage = 4;
			Remove.SetFractionToRemove("Stem", StemFrac);
			Remove.SetFractionToRemove("Leaf", LeafFrac);
			Remove.SetFractionToRemove("Root", RootFrac);
			Lucerne.RemoveBiomass("Cut", Remove);
		}
	}
}
```
        Operations Cutting
          2001-07-01  [Mower].Script.Cut(0.8,1.0,0.1);
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