Simulations: Area=0
  Simulation Test: Area=0
    WeatherFile: FileName=Goondiwindi.met
    Clock: StartDate=1940-01-01; EndDate=1989-12-31
    Summary
    Zone Field: Area=0
      Report: Events=Clock.EndOfDay
        Variables:
          .Clock.Today
          .WeatherFile.DayLength
          .WeatherFile.MaxT
          .WeatherFile.MinT
          .WeatherFile.Radn
          .WeatherFile.Rain
          Manager.Model.A
          Soil.SoilWater.sw_dep
      Manager Script
        A = 109608
```csharp
        using System;
        using Models.Core;

        namespace Models
        {
            public class Script : Model
            {      
               // Links
               [Link] Clock Clock;

               // Parameters
               public double A { get; set; }
               
               // Outputs
               public double B { get { return A * 9; } }

               public override void OnInitialised()
               {
                  Clock.StartOfDay += OnStartOfDay;
               }

               private void OnStartOfDay()
               {
                  A++;
               }
            }
        }
```
      Soil: SoilType=Black Vertosol; LocalName=Waco; Site=Jimbour; NearestTown=Jimbour, Q 4352; Region=South East Queensland; NaturalVegetation=Grassland, mainly Qld bluegrass; Latitude=0; Longitude=0; InitialWater={FractionFull=1, PercentMethod=FilledFromTop}
        Water={Thickness=[150, 150, 300, 300, 300, 300, 300, 300, 300, 300, 300], BD=[1.02, 1.03, 1.02, 1.02, 1.06, 1.11, 1.12, 1.15, 1.18, 1.2, 1.25], AirDry=[0.15, 0.26, 0.29, 0.29, 0.3, 0.31, 0.32, 0.33, 0.34, 0.35, 0.36], LL15=[0.29, 0.29, 0.29, 0.29, 0.3, 0.31, 0.32, 0.33, 0.34, 0.35, 0.36], DUL=[0.54, 0.53, 0.54, 0.54, 0.52, 0.5, 0.5, 0.48, 0.47, 0.46, 0.44], SAT=[0.59, 0.58, 0.59, 0.58, 0.57, 0.55, 0.55, 0.53, 0.52, 0.51, 0.49], SoilCrop=[{Thickness=[150, 150, 300, 300, 300, 300, 300, 300, 300, 300, 300], LL=[0.29, 0.29, 0.32, 0.38, 0.39, 0.39, 0.41, 0.48, 0.47, 0.46, 0.44], KL=[0.1, 0.1, 0.08, 0.06, 0.04, 0.02, 0.01, 0, 0, 0, 0], XF=[1, 1, 1, 1, 1, 1, 1, 0, 0, 0, 0]}, {Thickness=[150, 150, 300, 300, 300, 300, 300, 300, 300, 300, 300], LL=[0.29, 0.29, 0.36, 0.43, 0.51, 0.5, 0.5, 0.48, 0.47, 0.46, 0.44], KL=[0.1, 0.1, 0.08, 0.06, 0.04, 0.02, 0.01, 0, 0, 0, 0], XF=[1, 1, 1, 1, 1, 1, 1, 0, 0, 0, 0]}, {Thickness=[150, 150, 300, 300, 300, 300, 300, 300, 300, 300, 300], LL=[0.29, 0.29, 0.29, 0.29, 0.3, 0.31, 0.32, 0.33, 0.34, 0.35, 0.36], KL=[0.1, 0.1, 0.1, 0.1, 0.09, 0.09, 0.09, 0.09, 0.09, 0.09, 0.09], XF=[1, 1, 1, 1, 1, 1, 1, 1, 1, 1, 1]}, {Thickness=[150, 150, 300, 300, 300, 300, 300, 300, 300, 300, 300], LL=[0.29, 0.29, 0.34, 0.34, 0.37, 0.4, 0.42, 0.48, 0.47, 0.46, 0.44], KL=[0.1, 0.1, 0.1, 0.08, 0.06, 0.04, 0.02, 0, 0, 0, 0], XF=[1, 1, 1, 1, 1, 1, 1, 0, 0, 0, 0]}, {Thickness=[150, 150, 300, 300, 300, 300, 300, 300, 300, 300, 300], LL=[0.29, 0.29, 0.39, 0.41, 0.4, 0.4, 0.41, 0.41, 0.4, 0.4, 0.42], KL=[0.1, 0.1, 0.1, 0.1, 0.09, 0.07, 0.05, 0, 0, 0, 0], XF=[1, 1, 1, 1, 1, 1, 1, 0, 0, 0, 0]}, {Thickness=[150, 150, 300, 300, 300, 300, 300, 300, 300, 300, 300], LL=[0.29, 0.29, 0.35, 0.38, 0.4, 0.4, 0.4, 0.48, 0.47, 0.46, 0.44], KL=[0.1, 0.1, 0.1, 0.08, 0.06, 0.04, 0.02, 0, 0, 0, 0], XF=[1, 1, 1, 1, 1, 1, 1, 0, 0, 0, 0]}, {Thickness=[150, 150, 300, 300, 300, 300, 300, 300, 300, 300, 300], LL=[0.29, 0.29, 0.32, 0.32, 0.35, 0.38, 0.41, 0.48, 0.47, 0.46, 0.44], KL=[0.1, 0.1, 0.08, 0.06, 0.04, 0.02, 0.01, 0, 0, 0, 0], XF=[1, 1, 1, 1, 1, 1, 1, 0, 0, 0, 0]}]}
        SoilWater: min_crit_temp=5; max_crit_temp=35; max_albedo=0.23; A_to_evap_fact=0.44; canopy_eos_coef=1.7; sw_top_crit=0.9; sumes1_max=100; sumes2_max=25; solute_flow_eff=[1]; solute_flux_eff=[1]; gravity_gradient=2E-05; specific_bd=2.65; hydrol_effective_depth=450; immobile_solutes=[nh4]; canopy_fact=[1, 1, 0, 0]; canopy_fact_height=[0, 600, 1800, 30000]; canopy_fact_default=0.5; act_evap_method=ritchie; irrigation_will_runoff=0; irrigation_layer=0; SummerCona=3.5; SummerU=6; SummerDate=1-Nov; WinterCona=3.5; WinterU=6; WinterDate=1-Apr; DiffusConst=40; DiffusSlope=16; Salb=0.13; Thickness=[150, 150, 300, 300, 300, 300, 300, 300, 300, 300, 300]; SWCON=[0.3, 0.3, 0.3, 0.3, 0.3, 0.3, 0.3, 0.3, 0.3, 0.3, 0.3]; max_pond=0; CN2Bare=73; CNRed=20; CNCov=0.8
          mobile_solutes=[no3, urea, cl, br, org_n, org_c_pool1, org_c_pool2, org_c_pool3]
        SoilOrganicMatter: RootCN=40; RootWt=200; SoilCN=12.5; EnrACoeff=7.4; EnrBCoeff=0.2; OCUnits=Total
          Thickness  OC    FBiom  FInert
          150        1.04  0.025  0.4
          150        0.89  0.02   0.6
          300        0.89  0.015  0.8
          300        0.89  0.01   0.9
          300        0.77  0.01   0.95
          300        0.45  0.01   0.95
          300        0.27  0.01   0.95
          300        0.22  0.01   0.95
          300        0.16  0.01   0.95
          300        0.13  0.01   0.95
          300        0.12  0.01   0.95
        Analysis: PHUnits=Water; BoronUnits=HotWater
          Thickness  EC    PH
          150        0.2   8.4
          150        0.25  8.8
          300        0.31  9
          300        0.4   9.2
          300        0.59  9.2
          300        0.84  9.1
          300        0.93  9
          300        1.01  9
          300        1.06  8.9
          300        1.05  8.9
          300        1.01  8.9
  DataStore
  Tests
    Test={SimulationName=Test, TableName=Report, Type=AllPos, ColumnNames=.WeatherFile.MaxT}
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